# OpenSim document version 40000
Model ComputerMouse:
  gravity: 0 -9.80665 0
  publications: Comp Meth Biomech Biomed Eng 2014
  length_units: meters
  force_units: N
  credits:
    Katherine R. Saul, Wendy M. Murray, Craig M. Goehler, Melissa Daly, Meghan E. Vidt, Dustin L. Crouch
  Ground: meshes=thorax.vtp
    WrapEllipsoid Thorax: xyz_body_rotation=(0.0434587 -0.331962 0.189892) translation=(-0.0386 -0.1273 0.0709)
        quadrant=all dimensions=(0.1 0.135 0.08)
  BodySet:
    Body clavicle: mass=0.156 [kg] mass_center=(-0.011096 0.0063723 0.054168)
        inertia=(0.00024259 0.00025526 4.442e-5 -1.898e-5 -6.994e-5 5.371e-5) meshes=clavicle.vtp
    Body clavphant: mass=0.0001 mass_center=(0 0 0) inertia=(1 1 1 0 0 0)
    Body scapula: mass=0.70396 mass_center=(-0.054694 -0.035032 -0.043734)
        inertia=(0.0012429 0.0011504 0.0013651 0.0004494 0.00040922 0.0002411) meshes=scapula.vtp
      WrapEllipsoid Deltoid2: xyz_body_rotation=(3.13042 -1.54881 -1.31423) translation=(-0.0058 -0.0378 0.0096)
          quadrant=-y dimensions=(0.033 0.04 0.035)
      WrapTorus Delt3: xyz_body_rotation=(0.620988 0.32882 -0.560774) translation=(-0.0973 -0.0428 -0.037) quadrant=all
          inner_radius=0.04 outer_radius=0.06
      WrapTorus INFSP: xyz_body_rotation=(0.0253073 0.58835 0.151844) translation=(-0.0561 -0.0199 -0.0112)
          quadrant=all inner_radius=0.008 outer_radius=0.019
      WrapEllipsoid TMIN: xyz_body_rotation=(-2.09754 -0.280823 -1.76348) translation=(-0.0418 -0.0519 -0.0359)
          quadrant=x dimensions=(0.03 0.03 0.05)
      WrapCylinder TRIlongglen: xyz_body_rotation=(1.37532 -0.294612 2.43596) translation=(-0.0359 -0.0309 -0.0132)
          quadrant=x radius=0.003 length=0.03
    Body scapphant: mass=0.0001 mass_center=(0 0 0) inertia=(1 1 1 0 0 0)
    Body humphant: mass=0.0001 mass_center=(0 0 0) inertia=(1 1 1 0 0 0)
    Body humphant1: mass=0.0001 mass_center=(0 0 0) inertia=(1 1 1 0 0 0)
    Body humerus: mass=1.99757 mass_center=(0.018064 -0.140141 -0.012746)
        inertia=(0.0122776 0.00255133 0.0125789 -0.00034741 -0.0002325 0.0012293) meshes=humerus.vtp
      WrapEllipsoid DELT1hh: xyz_body_rotation=(0.0584685 1.00461 0.570374) translation=(-0.0139 -0.0127 -0.0262)
          quadrant=z dimensions=(0.03 0.1 0.05)
      WrapCylinder delt2hum: xyz_body_rotation=(1.55093 -0.0199582 0.0596618) translation=(0.0017 -0.0958 0.0011)
          quadrant=all radius=0.0109 length=0.12
      WrapEllipsoid delt3hum: xyz_body_rotation=(1.72735 0.0759218 -2.74313) translation=(0.0019 -0.0592 0.0011)
          quadrant=x dimensions=(0.01 0.01 0.05)
      WrapEllipsoid SUPSP: xyz_body_rotation=(0.0380482 0.00855211 -1.30673) translation=(0.0002 0.0077 0.0043)
          quadrant=all dimensions=(0.02 0.02 0.02)
      WrapEllipsoid INFSP_and_TMIN_hum_head: xyz_body_rotation=(-0.286583 -0.00907571 -0.0684169)
          translation=(-0.0003 0.0026 0.0038) quadrant=all dimensions=(0.02 0.025 0.02)
      WrapCylinder infsp_new: xyz_body_rotation=(1.52911 -0.345 -0.65966) translation=(-0.0019 -0.019 0.0022)
          quadrant=-x radius=0.0235 length=0.115
      WrapEllipsoid SUBSCAP: xyz_body_rotation=(-0.924501 0.288852 0.381529) translation=(-0.0025 0.0007 -0.0045)
          quadrant=all dimensions=(0.02 0.017 0.028)
      WrapEllipsoid LIGhh_s: xyz_body_rotation=(-0.785 0 0) translation=(-0.001 0.003 0.003) quadrant=all
          dimensions=(0.02 0.02 0.02)
      WrapEllipsoid LIGhh_mi: xyz_body_rotation=(-0.785 0 0) translation=(-0.001 0.004 0.001) quadrant=all
          dimensions=(0.0205 0.019 0.0205)
      WrapCylinder TMINhum: xyz_body_rotation=(1.47353 0.0229 3.21463) translation=(0.003 -0.0255 0.0013) quadrant=x
          radius=0.022 length=0.113
      WrapCylinder TMAJ_LAThum: xyz_body_rotation=(1.53641 -0.0637045 1.41424) translation=(0.0007 -0.0443 -0.0055)
          quadrant=-x radius=0.007 length=0.04
      WrapCylinder PEC12hum: xyz_body_rotation=(1.55928 -0.0774926 -0.925897) translation=(0.002 -0.0508 -0.0017)
          quadrant=x radius=0.009 length=0.07
      WrapSphere PEC23hh: translation=(-0.0086 0.0021 -0.0004) quadrant=all radius=0.02
      WrapEllipsoid PEC1hh: xyz_body_rotation=(-0.620465 -0.310494 0.363727) translation=(-0.0037 0.0005 -0.0025)
          quadrant=-z dimensions=(0.03 0.02 0.02)
      WrapCylinder PEC3hum: xyz_body_rotation=(1.44094 -0.0561996 1.75196) translation=(0.0009 -0.0551 -0.0004)
          quadrant=-x radius=0.008 length=0.1
      WrapCylinder LAT_TMAJhh: xyz_body_rotation=(-0.305084 -0.018326 -0.686613) translation=(-0.0224 0.0102 0.0094)
          quadrant=-y radius=0.007 length=0.045
      WrapSphere LAT_TMAJ2hh: xyz_body_rotation=(-0.127235 0.276111 0.0197222) translation=(-0.0016 0.0092 0.0052)
          quadrant=all radius=0.03
      WrapEllipsoid Elbow_BIC_BRD: xyz_body_rotation=(-0.128631 0.137532 0.0307178) translation=(0.0019 -0.289 -0.014)
          quadrant=x dimensions=(0.015 0.015 0.1)
      WrapEllipsoid TRIlonghh: xyz_body_rotation=(3.00162 -0.853466 2.57419) translation=(-0.0078 -0.0041 -0.0014)
          quadrant=z dimensions=(0.035 0.02 0.02)
      WrapCylinder TRI: xyz_body_rotation=(-0.14015 -0.00628319 0.154985) translation=(0.0028 -0.2919 -0.0119)
          quadrant=all radius=0.016 length=0.1
      WrapEllipsoid ANC: xyz_body_rotation=(0.00750492 -0.196699 1.04929) translation=(0.0134 -0.2861 -0.0008)
          quadrant=-x dimensions=(0.02 0.02 0.02)
      WrapEllipsoid BIClong: xyz_body_rotation=(-2.00434 -1.00164 0.975465) translation=(0.0033 0.005 0.0003)
          quadrant=-y dimensions=(0.025 0.02 0.02)
      WrapSphere TMAJ_LAT_PEC_CORBhh: translation=(0.0007 0 0.006) quadrant=all radius=0.03
      WrapSphere DELT_TMAJ_LAT_PEC_CORBhh: translation=(0.0007 0 0.006) quadrant=all radius=0.03
      WrapCylinder CORBhum: xyz_body_rotation=(-1.60832 0.0959931 0.875283) translation=(0.0027 -0.1202 -0.0059)
          quadrant=x radius=0.008 length=0.1
      WrapEllipsoid Elbow_PT_ECRL: xyz_body_rotation=(-0.161094 -0.110828 0.61453) translation=(0.003 -0.2872 -0.0069)
          quadrant=x dimensions=(0.018 0.025 0.035)
    Body ulna: mass=1.1053 mass_center=(0.00971783 -0.0959509 0.024286)
        inertia=(0.00541309 0.00115318 0.00494361 0.00031686 -7.615e-5 0.00109169) meshes=ulna.vtp
      WrapCylinder PQ2: xyz_body_rotation=(1.39138 0.0689405 1.52245) translation=(-0.0012 -0.2092 0.0428) quadrant=all
          radius=0.007 length=0.1
    Body radius: mass=0.23359 mass_center=(0.0336341 -0.181559 0.0156)
        inertia=(0.00043855 8.859e-5 0.00040258 3.014e-5 -4.24e-6 6.418e-5) meshes=radius.vtp
      WrapCylinder SUP: xyz_body_rotation=(1.44775 0.304036 -2.44102) translation=(0.0045 -0.0437 0.0059) quadrant=-x
          radius=0.008 length=0.04
      WrapTorus ECU: xyz_body_rotation=(-0.986635 -0.148877 0.222704) translation=(-0.0163 -0.2417 0.0349) quadrant=all
          inner_radius=0.006 outer_radius=0.009
      WrapCylinder PQ1: xyz_body_rotation=(-1.60762 -0.0127409 -2.69025) translation=(0.0281 -0.1986 0.0288)
          quadrant=all radius=0.01 length=0.1
    Body proximal_row: mass=0.0001 mass_center=(0 0 0) inertia=(1e-5 1e-5 1e-5 0 0 0)
        meshes=(lunate.vtp sdfastSCAPHOIDw.vtp sdfastPISIFORMw.vtp sdfastTRIQUETRALw.vtp)
      WrapEllipsoid EIP: xyz_body_rotation=(-0.250804 0.285536 0.232827) translation=(0.0007 -0.0135 0.0047) quadrant=z
          dimensions=(0.05 0.02 0.013)
      WrapTorus ECRL: xyz_body_rotation=(1.53833 0.234398 0.731118) translation=(0.0222 -0.0096 0.0208) quadrant=all
          inner_radius=0.008 outer_radius=0.016
      WrapTorus ECRB: xyz_body_rotation=(1.31266 -0.11781 -0.116239) translation=(0.0126 -0.0095 0.0186) quadrant=all
          inner_radius=0.008 outer_radius=0.01
      WrapTorus FCR: xyz_body_rotation=(-1.55596 -0.15324 -0.100007) translation=(0.0032 -0.0045 -0.019) quadrant=all
          inner_radius=0.001 outer_radius=0.0025
      WrapTorus FCU: xyz_body_rotation=(-1.57376 -0.0797616 0.39235) translation=(-0.0123 -0.0124 -0.0171) quadrant=all
          inner_radius=0.0068 outer_radius=0.008
      WrapEllipsoid PL: xyz_body_rotation=(-0.0315905 0.0996583 0.0633554) translation=(0.0057 -0.018 -0.0041)
          quadrant=-z dimensions=(0.025 0.014 0.012)
      WrapEllipsoid FDS: xyz_body_rotation=(0.00837758 -0.0816814 -0.0171042) translation=(0.0012 -0.0057 -0.0003)
          quadrant=-z dimensions=(0.025 0.013 0.012)
      WrapEllipsoid FDP: xyz_body_rotation=(-1.46747 -0.194604 0.121824) translation=(-0.0022 -0.0069 0.0032)
          quadrant=y dimensions=(0.025 0.013 0.012)
      WrapTorus EDCL: xyz_body_rotation=(2.36318 0.193033 -0.26913) translation=(-0.0128 -0.0133 0.0148) quadrant=all
          inner_radius=0.008 outer_radius=0.012
      WrapTorus EDCR: xyz_body_rotation=(1.98392 0.100531 0.523075) translation=(-0.0098 -0.0137 0.0166) quadrant=all
          inner_radius=0.0105 outer_radius=0.011
      WrapTorus EDCM: xyz_body_rotation=(1.99317 0.19792 0.368264) translation=(-0.0007 -0.0117 0.0191) quadrant=all
          inner_radius=0.009 outer_radius=0.012
      WrapTorus EDCI: xyz_body_rotation=(1.69768 0.0897099 0.00767945) translation=(0.009 -0.0149 0.0211) quadrant=all
          inner_radius=0.009 outer_radius=0.012
      WrapEllipsoid EDM: xyz_body_rotation=(2.9627 0.159349 0.117984) translation=(-0.0167 -0.0022 0.0048) quadrant=-z
          dimensions=(0.018 0.014 0.008)
      WrapEllipsoid FPL: xyz_body_rotation=(-0.16633 -0.082205 -0.0659735) translation=(0.018 -0.024 -0.0053)
          quadrant=-z dimensions=(0.016 0.01 0.01)
    Body capitate: mass=0.32742 mass_center=(-0.00028 0.00333 -0.0045) inertia=(1.50577e-5 3.36765e-5 3.96251e-5 0 0 0)
        meshes=capitate.vtp
    Body trapezium: mass=1e-5 mass_center=(0 0 0) inertia=(1e-5 1e-5 1e-5 0 0 0) meshes=trapezium.vtp
    Body trapezoid: mass=1e-5 mass_center=(0 0 0) inertia=(1e-5 1e-5 1e-5 0 0 0) meshes=trapezoid.vtp
    Body hamate: mass=1e-5 mass_center=(0 0 0) inertia=(1e-5 1e-5 1e-5 0 0 0) meshes=hamate.vtp
    Body firstmc1: mass=1e-5 mass_center=(0 0 0) inertia=(1e-5 1e-5 1e-5 0 0 0)
    Body firstmc: mass=0.016 mass_center=(0.00784 -0.01472 -0.00602)
        inertia=(2.37885e-6 1.42171e-6 2.52462e-6 9.44456e-7 5.02069e-7 -8.17251e-7) meshes=1mc.vtp
      WrapCylinder MPthumb: xyz_body_rotation=(0.321315 0.11013 -0.834791) translation=(0.0177 -0.0305 -0.0143)
          quadrant=all radius=0.0085 length=0.02
    Body proximal_thumb: mass=0.0079 mass_center=(0.0096 -0.0163 -0.0063)
        inertia=(5.21128e-7 3.19263e-7 5.85041e-7 1.89419e-7 7.52377e-8 -1.25343e-7) meshes=thumbprox.vtp
      WrapCylinder IPthumb: xyz_body_rotation=(0.304734 0.0129154 0.0879646) translation=(0.0121 -0.0302 -0.0096)
          quadrant=-x radius=0.0045 length=0.01
    Body distal_thumb: mass=0.0031 mass_center=(0.00557 -0.01042 -0.0044)
        inertia=(9.21409e-8 6.4461e-8 1.0021e-7 2.83547e-8 1.30692e-8 -2.09219e-8) meshes=thumbdist.vtp
    Body secondmc: mass=0.03636364 mass_center=(0 0 0)
        inertia=(9.77694e-6 5.2901e-7 9.74293e-6 1.45439e-6 -2.39734e-7 1.56119e-6) meshes=2mc.vtp
      WrapCylinder 2ndmcp_extI: xyz_body_rotation=(0.593936 1.50011 -1.99125) translation=(0.003501 -0.025 0.0038)
          quadrant=all radius=0.009 length=0.01
      WrapCylinder 2ndmcp_FDSI: xyz_body_rotation=(0.593936 1.50011 -2.16578) translation=(0.003501 -0.0275 0.00362)
          quadrant=Y radius=0.011 length=0.02
      WrapCylinder 2ndmcp_FDPI: xyz_body_rotation=(0.593936 1.50011 -2.23559) translation=(0.003501 -0.0275 0.00362)
          quadrant=Y radius=0.0102 length=0.02
    Body thirdmc: mass=0.03809524 mass_center=(0 0 0)
        inertia=(8.88872e-6 2.94745e-7 8.74396e-6 1.28499e-7 -1.67854e-8 1.12285e-6) meshes=3mc.vtp
      WrapCylinder _3rdmcp: xyz_body_rotation=(2.57942 -1.44967 2.90615) translation=(0.0016 -0.0271 0.0001)
          quadrant=all radius=0.005 length=0.02
    Body fourthmc: mass=0.03333333 mass_center=(-0.002 -0.0214 0.0034)
        inertia=(6.85118e-6 3.48871e-7 6.79306e-6 -7.03734e-7 1.00224e-7 9.36766e-7) meshes=4mc_new.vtp
      WrapCylinder _4thmcp: xyz_body_rotation=(-2.97212 -1.22173 -2.46318)
          translation=(-0.0057013 -0.0508692 0.0044135) quadrant=all radius=0.005 length=0.02
    Body fifthmc: mass=0.02962963 mass_center=(-0.00611809 -0.0176936 0.00542873)
        inertia=(4.76564e-6 5.73128e-7 4.8195e-6 -1.05652e-6 2.22645e-7 9.3644e-7) meshes=5mc_new.vtp
      WrapCylinder _5thmcp: xyz_body_rotation=(-2.67175 -1.5 -2.46598) translation=(-0.0130014 -0.0430027 0.0100162)
          quadrant=all radius=0.005 length=0.02
      WrapEllipsoid 5thmcp: xyz_body_rotation=(-2.67175 -1.5 -2.46598) translation=(-0.015 -0.0429103 0.008)
          quadrant=-x dimensions=(0.005 0.005 0.0065)
    Body 2proxph: mass=0.0158 mass_center=(0.0044 -0.0253 0.004)
        inertia=(2.41151e-6 5.63074e-7 2.40133e-6 3.31406e-7 -6.25061e-8 3.595e-7) meshes=2proxph.vtp
      WrapCylinder 2ndpm_FDSI: xyz_body_rotation=(-2.99394 1.28823 1.41721) translation=(0.0075 -0.041 0.0045)
          quadrant=all radius=0.0055 length=0.01
      WrapCylinder 2ndpm_FDPI: xyz_body_rotation=(-2.99394 1.28823 1.41721) translation=(0.0075 -0.0405 0.008)
          quadrant=y radius=0.008 length=0.02
      WrapCylinder 2ndpm_extI: xyz_body_rotation=(-2.99394 1.28823 1.41721) translation=(0.0075 -0.04075 0.0073)
          quadrant=-y radius=0.00425 length=0.012
      WrapCylinder Secondpm: xyz_body_rotation=(0.741939 -1.47393 0.709651) translation=(0.0075 -0.0407 0.0061)
          quadrant=x radius=0.004 length=0.01
    Body 2midph: mass=0.0049 mass_center=(0.0022 -0.0154 0.00018)
        inertia=(2.83258e-7 7.29644e-8 2.85452e-7 2.38649e-8 -1.13365e-9 1.01166e-8) meshes=2midph.vtp
      WrapCylinder 2ndmd_extI: xyz_body_rotation=(-2.755 1.36537 1.1767) translation=(0.0033 -0.0215 0.0035)
          quadrant=-y radius=0.004 length=0.01
      WrapCylinder Secondmd: xyz_body_rotation=(0.501782 -1.41302 0.647343) translation=(0.0036 -0.0243 0.0003)
          quadrant=x radius=0.004 length=0.01
    Body 2distph: mass=0.0018 mass_center=(0.0013 -0.01 2e-5)
        inertia=(4.55172e-8 1.5752e-8 4.61775e-8 5.5272e-9 -5.75024e-10 3.19996e-9) meshes=2distph.vtp
    Body 3proxph: mass=0.0193 mass_center=(0.00097 -0.0262 0.0037)
        inertia=(3.52375e-6 6.16459e-7 3.51005e-6 8.59086e-8 -6.41769e-9 2.17375e-7) meshes=3proxph.vtp
      WrapCylinder Thirdpm: xyz_body_rotation=(1.80886 -1.50604 1.85319) translation=(0.0017 -0.0439 0.005)
          quadrant=all radius=0.005 length=0.01
    Body 3midph: mass=0.00642 mass_center=(0.00071 -0.0168 0.0013)
        inertia=(5.24504e-7 1.0143e-7 5.2473e-7 1.99401e-8 -8.17162e-10 1.73764e-8) meshes=3midph.vtp
      WrapCylinder Thirdmd: xyz_body_rotation=(1.37881 -1.4933 1.51861) translation=(0.0014 -0.028 0.0012) quadrant=x
          radius=0.004 length=0.01
    Body 3distph: mass=0.00252 mass_center=(0.0005 -0.0102 -0.00028)
        inertia=(8.07596e-8 2.65112e-8 8.05851e-8 4.0623e-9 -3.79846e-10 5.10078e-9) meshes=3distph.vtp
    Body 4proxph: mass=0.01374 mass_center=(-0.00223386 -0.0237516 0.00349321)
        inertia=(1.95194e-6 3.90612e-7 1.95683e-6 -2.0172e-7 2.30682e-8 1.81482e-7) meshes=4proxph_new.vtp
      WrapCylinder Fourthpm: xyz_body_rotation=(0 -1.5 0) translation=(-0.00416056 -0.0398013 0.00417815) quadrant=all
          radius=0.004 length=0.01
    Body 4midph: mass=0.00568 mass_center=(-0.00197812 -0.0147055 0.00118627)
        inertia=(3.60389e-7 9.43143e-8 3.60306e-7 -2.36509e-8 2.12726e-9 2.41196e-8) meshes=4midph_new.vtp
      WrapCylinder Fourthmd: xyz_body_rotation=(0 -1.5 0) translation=(-0.00263942 -0.023 0.00256231) quadrant=x
          radius=0.005 length=0.01
    Body 4distph: mass=0.0029 mass_center=(-0.000427077 -0.0101666 0.00202904)
        inertia=(9.90716e-8 3.64408e-8 9.65165e-8 -5.72303e-9 1.26263e-9 1.39322e-8) meshes=4distph_new.vtp
    Body 5proxph: mass=0.01106 mass_center=(-0.00810107 -0.0210768 0.00214055)
        inertia=(1.18153e-6 3.71642e-7 1.29122e-6 -3.28491e-7 2.81259e-8 7.93172e-8) meshes=5proxph_new.vtp
      WrapCylinder Fifthpm: xyz_body_rotation=(-1.75 -1.1 -2.95449) translation=(-0.0133173 -0.0327233 0.00294018)
          quadrant=all radius=0.004 length=0.01
    Body 5midph: mass=0.00372 mass_center=(-0.00489968 -0.0121355 -0.000152595)
        inertia=(1.56521e-7 6.14486e-8 1.702e-7 -4.00308e-8 3.68865e-9 1.01068e-8) meshes=5midph_new.vtp
      WrapCylinder Fifthmd: xyz_body_rotation=(-2 -1.25 -1.75) translation=(-0.00736879 -0.0194062 0.00136094)
          quadrant=x radius=0.005 length=0.01
    Body 5distph: mass=0.00222 mass_center=(-0.00358265 -0.00888113 0.000331822)
        inertia=(5.05502e-8 2.88772e-8 5.59113e-8 -1.23535e-8 1.14735e-9 2.53269e-9) meshes=5distph_new.vtp
  JointSet:
    CustomJoint sternoclavicular: socket_parent_frame=ground_offset socket_child_frame=clavicle_offset
      Coordinate sternoclavicular_r2: default_value=-0.1267112 range=(-99999.9 99999.9) clamped=false
      Coordinate sternoclavicular_r3: default_value=0.05366888 range=(-99999.9 99999.9) clamped=false
      PhysicalOffsetFrame ground_offset: socket_parent=/ground translation=(0.006325 0.00693 0.025465) [meters]
      PhysicalOffsetFrame clavicle_offset: socket_parent=/bodyset/clavicle translation=(0 0 0)
      SpatialTransform: axes_held_at_zero=(rotation3 translation1 translation2 translation3)
        TransformAxis rotation1: coordinates=sternoclavicular_r2 axis=(0.0153 0.9892987 -0.1451)
            LinearFunction(coefficients=1 0)
        TransformAxis rotation2: coordinates=sternoclavicular_r3 axis=(-0.9944725 0 -0.104997)
            LinearFunction(coefficients=1 0)
    CustomJoint unrotscap: socket_parent_frame=clavicle_offset socket_child_frame=clavphant_offset
      Coordinate unrotscap_r3: default_value=-0.05366888 range=(-99999.9 99999.9) clamped=false
      Coordinate unrotscap_r2: default_value=0.1267112 range=(-99999.9 99999.9) clamped=false
      PhysicalOffsetFrame clavicle_offset: socket_parent=/bodyset/clavicle translation=(-0.01433 0.02007 0.135535)
      PhysicalOffsetFrame clavphant_offset: socket_parent=/bodyset/clavphant translation=(0 0 0)
      SpatialTransform: axes_held_at_zero=(rotation3 translation1 translation2 translation3)
        TransformAxis rotation1: coordinates=unrotscap_r3 axis=(-0.9944725 0 -0.104997)
            LinearFunction(coefficients=1 0)
        TransformAxis rotation2: coordinates=unrotscap_r2 axis=(0.0153 0.9892987 -0.1451)
            LinearFunction(coefficients=1 0)
    CustomJoint acromioclavicular: socket_parent_frame=clavphant_offset socket_child_frame=scapula_offset
      Coordinate acromioclavicular_r2: default_value=-0.02565644 range=(-99999.9 99999.9) clamped=false
      Coordinate acromioclavicular_r3: default_value=0.2073463 range=(-99999.9 99999.9) clamped=false
      Coordinate acromioclavicular_r1: default_value=0.09320074 range=(-99999.9 99999.9) clamped=false
      PhysicalOffsetFrame clavphant_offset: socket_parent=/bodyset/clavphant translation=(0 0 0)
      PhysicalOffsetFrame scapula_offset: socket_parent=/bodyset/scapula translation=(0 0 0)
      SpatialTransform: axes_held_at_zero=(translation1 translation2 translation3)
        TransformAxis rotation1: coordinates=acromioclavicular_r2 axis=(0.1570949 0.9472686 -0.2792909)
            LinearFunction(coefficients=1 0)
        TransformAxis rotation2: coordinates=acromioclavicular_r3 axis=(-0.754084 0.297594 0.585487)
            LinearFunction(coefficients=1 0)
        TransformAxis rotation3: coordinates=acromioclavicular_r1 axis=(0.6376998 0.1186 0.7610998)
            LinearFunction(coefficients=1 0)
    CustomJoint unrothum: socket_parent_frame=scapula_offset socket_child_frame=scapphant_offset
      Coordinate unrothum_r1: default_value=-0.09320074 range=(-99999.9 99999.9) clamped=false
      Coordinate unrothum_r3: default_value=-0.2073463 range=(-99999.9 99999.9) clamped=false
      Coordinate unrothum_r2: default_value=0.02565644 range=(-99999.9 99999.9) clamped=false
      PhysicalOffsetFrame scapula_offset: socket_parent=/bodyset/scapula translation=(-0.00955 -0.034 0.009)
      PhysicalOffsetFrame scapphant_offset: socket_parent=/bodyset/scapphant translation=(0 0 0)
      SpatialTransform: axes_held_at_zero=(translation1 translation2 translation3)
        TransformAxis rotation1: coordinates=unrothum_r1 axis=(0.6376998 0.1186 0.7610998)
            LinearFunction(coefficients=1 0)
        TransformAxis rotation2: coordinates=unrothum_r3 axis=(-0.754084 0.297594 0.585487)
            LinearFunction(coefficients=1 0)
        TransformAxis rotation3: coordinates=unrothum_r2 axis=(0.1570949 0.9472686 -0.2792909)
            LinearFunction(coefficients=1 0)
    CustomJoint shoulder0: socket_parent_frame=scapphant_offset socket_child_frame=humphant_offset
      Coordinate elv_angle: default_value=1.570796 range=(-1.658063 2.268928) clamped=true
      PhysicalOffsetFrame scapphant_offset: socket_parent=/bodyset/scapphant translation=(0 0 0)
      PhysicalOffsetFrame humphant_offset: socket_parent=/bodyset/humphant translation=(0 0 0)
      SpatialTransform: axes_held_at_zero=(rotation2 rotation3 translation1 translation2 translation3)
        TransformAxis rotation1: coordinates=elv_angle axis=(0.0048 0.9990892 0.04240001)
            LinearFunction(coefficients=1 0)
    CustomJoint shoulder1: socket_parent_frame=humphant_offset socket_child_frame=humphant1_offset
      Coordinate shoulder_elv: default_value=0.5235988 range=(0 3.141593) clamped=true
      Coordinate shoulder1_r2: default_value=-1.570796 range=(-99999.9 99999.9) clamped=false
      PhysicalOffsetFrame humphant_offset: socket_parent=/bodyset/humphant translation=(0 0 0)
      PhysicalOffsetFrame humphant1_offset: socket_parent=/bodyset/humphant1 translation=(0 0 0)
      SpatialTransform: axes_held_at_zero=(rotation3 translation1 translation2 translation3)
        TransformAxis rotation1: coordinates=shoulder_elv axis=(-0.9982614 0.0023 0.05889802)
            LinearFunction(coefficients=1 0)
        TransformAxis rotation2: coordinates=shoulder1_r2 axis=(0.0048 0.9990892 0.04240001)
            LinearFunction(coefficients=1 0)
    CustomJoint shoulder2: socket_parent_frame=humphant1_offset socket_child_frame=humerus_offset
      Coordinate shoulder_rot: default_value=0 range=(-1.570796 2.094395) clamped=true
      PhysicalOffsetFrame humphant1_offset: socket_parent=/bodyset/humphant1 translation=(0 0 0)
      PhysicalOffsetFrame humerus_offset: socket_parent=/bodyset/humerus translation=(0 0 0)
      SpatialTransform: axes_held_at_zero=(rotation2 rotation3 translation1 translation2 translation3)
        TransformAxis rotation1: coordinates=shoulder_rot axis=(0.0048 0.9990892 0.04240001)
            LinearFunction(coefficients=1 0)
    CustomJoint elbow: socket_parent_frame=humerus_offset socket_child_frame=ulna_offset
      Coordinate elbow_flexion: default_value=0 range=(0 2.268928) clamped=true
      PhysicalOffsetFrame humerus_offset: socket_parent=/bodyset/humerus translation=(0.0061 -0.2904 -0.0123)
      PhysicalOffsetFrame ulna_offset: socket_parent=/bodyset/ulna translation=(0 0 0)
      SpatialTransform: axes_held_at_zero=(rotation2 rotation3 translation1 translation2 translation3)
        TransformAxis rotation1: coordinates=elbow_flexion axis=(0.04940001 0.03660001 0.9981083)
            LinearFunction(coefficients=1 0)
    CustomJoint radioulnar: socket_parent_frame=ulna_offset socket_child_frame=radius_offset
      Coordinate pro_sup: default_value=-2e-8 range=(-1.570796 1.570796) clamped=true
      PhysicalOffsetFrame ulna_offset: socket_parent=/bodyset/ulna translation=(0.0004 -0.011503 0.019999)
      PhysicalOffsetFrame radius_offset: socket_parent=/bodyset/radius translation=(0 0 0)
      SpatialTransform: axes_held_at_zero=(rotation2 rotation3 translation1 translation2 translation3)
        TransformAxis rotation1: coordinates=pro_sup axis=(-0.01716099 0.9926656 -0.119668)
            LinearFunction(coefficients=1 0)
    CustomJoint radiocarpal: socket_parent_frame=radius_offset socket_child_frame=proximal_row_offset
      Coordinate deviation: default_value=0 range=(-0.1745329 0.4363323) clamped=true
      Coordinate flexion: default_value=0 range=(-1.22173 1.22173) clamped=true
      PhysicalOffsetFrame radius_offset: socket_parent=/bodyset/radius translation=(0.018 -0.242 0.025)
      PhysicalOffsetFrame proximal_row_offset: socket_parent=/bodyset/proximal_row translation=(0 0 0)
      SpatialTransform: axes_held_at_zero=(rotation2 translation1 translation2 translation3)
        TransformAxis rotation1: coordinates=deviation axis=(-0.819064 -0.135611 -0.557444)
          SimmSpline: x=(-0.174533 0 0.436332) y=(-0.174533 0 0.436332)
        TransformAxis rotation3: coordinates=flexion axis=(0.9564267 -0.2522069 0.147104)
          SimmSpline: x=(-1.5708 1.5708) y=(-0.785398 0.785398)
    CustomJoint wrist_hand: socket_parent_frame=proximal_row_offset socket_child_frame=capitate_offset
      Coordinate wrist_hand_r1: default_value=1.200458e-7 range=(-99999.9 99999.9) clamped=false
      Coordinate wrist_hand_r3: default_value=1.410066e-9 range=(-99999.9 99999.9) clamped=false
      PhysicalOffsetFrame proximal_row_offset: socket_parent=/bodyset/proximal_row
          translation=(0.003992 -0.015054 0.002327)
      PhysicalOffsetFrame capitate_offset: socket_parent=/bodyset/capitate translation=(0 0 0)
      SpatialTransform: axes_held_at_zero=(rotation3 translation1 translation2 translation3)
        TransformAxis rotation1: coordinates=wrist_hand_r1 axis=(0.8991357 -0.3490529 -0.2640399)
            LinearFunction(coefficients=1 0)
        TransformAxis rotation2: coordinates=wrist_hand_r3 axis=(0.9971185 0.01069999 -0.07510096)
            LinearFunction(coefficients=1 0)
    WeldJoint cap_trpzm: socket_parent_frame=capitate_offset socket_child_frame=trapezium_offset
      PhysicalOffsetFrame capitate_offset: socket_parent=/bodyset/capitate translation=(0.015293 -0.004569 -0.010308)
      PhysicalOffsetFrame trapezium_offset: socket_parent=/bodyset/trapezium translation=(0 0 0)
    WeldJoint cap_trpzd: socket_parent_frame=capitate_offset socket_child_frame=trapezoid_offset
      PhysicalOffsetFrame capitate_offset: socket_parent=/bodyset/capitate translation=(0.009143 -0.004062 -0.002464)
      PhysicalOffsetFrame trapezoid_offset: socket_parent=/bodyset/trapezoid translation=(0 0 0)
    WeldJoint cap_ham: socket_parent_frame=capitate_offset socket_child_frame=hamate_offset
      PhysicalOffsetFrame capitate_offset: socket_parent=/bodyset/capitate translation=(-0.010969 -0.002495 -0.00075)
      PhysicalOffsetFrame hamate_offset: socket_parent=/bodyset/hamate translation=(0 0 0)
    CustomJoint CMC1a: socket_parent_frame=trapezium_offset socket_child_frame=firstmc1_offset
      Coordinate cmc_flexion: default_value=-1.409216e-14 range=(-0.7853982 0.2617994) clamped=false
      PhysicalOffsetFrame trapezium_offset: socket_parent=/bodyset/trapezium translation=(0 0 0)
      PhysicalOffsetFrame firstmc1_offset: socket_parent=/bodyset/firstmc1 translation=(0 0 0)
      SpatialTransform: axes_held_at_zero=(rotation1 rotation2 translation1 translation2 translation3)
        TransformAxis rotation3: coordinates=cmc_flexion axis=(0.04239899 0.6652858 -0.7453838)
            LinearFunction(coefficients=1 0)
    CustomJoint CMC1b: socket_parent_frame=firstmc1_offset socket_child_frame=firstmc_offset
      Coordinate cmc_abduction: default_value=-1.1404e-13 range=(-0.4363323 0.4363323) clamped=false
      PhysicalOffsetFrame firstmc1_offset: socket_parent=/bodyset/firstmc1 translation=(0.0072 -0.0054 -0.0025)
      PhysicalOffsetFrame firstmc_offset: socket_parent=/bodyset/firstmc translation=(0 0 0)
      SpatialTransform: axes_held_at_zero=(rotation2 rotation3 translation1 translation2 translation3)
        TransformAxis rotation1: coordinates=cmc_abduction axis=(0.495557 0.731736 0.467959)
            LinearFunction(coefficients=1 0)
    CustomJoint MCP: socket_parent_frame=firstmc_offset socket_child_frame=proximal_thumb_offset
      Coordinate mp_flexion: default_value=-1.529585e-14 range=(-0.6981317 0.7853982) clamped=false
      PhysicalOffsetFrame firstmc_offset: socket_parent=/bodyset/firstmc translation=(0.0165 -0.0292 -0.0127)
      PhysicalOffsetFrame proximal_thumb_offset: socket_parent=/bodyset/proximal_thumb translation=(0 0 0)
      SpatialTransform: axes_held_at_zero=(rotation1 rotation2 translation1 translation2 translation3)
        TransformAxis rotation3: coordinates=mp_flexion axis=(0.084295 0.203488 -0.975442)
            LinearFunction(coefficients=1 0)
    CustomJoint IP: socket_parent_frame=proximal_thumb_offset socket_child_frame=distal_thumb_offset
      Coordinate ip_flexion: default_value=-3.997008e-14 range=(-0.4363323 1.308997) clamped=false
      PhysicalOffsetFrame proximal_thumb_offset: socket_parent=/bodyset/proximal_thumb
          translation=(0.014 -0.0259 -0.0101)
      PhysicalOffsetFrame distal_thumb_offset: socket_parent=/bodyset/distal_thumb translation=(0 0 0)
      SpatialTransform: axes_held_at_zero=(rotation1 rotation2 translation1 translation2 translation3)
        TransformAxis rotation3: coordinates=ip_flexion axis=(0.05010201 0.4796231 -0.8760431)
            LinearFunction(coefficients=1 0)
    WeldJoint CMC2: socket_parent_frame=capitate_offset socket_child_frame=secondmc_offset
      PhysicalOffsetFrame capitate_offset: socket_parent=/bodyset/capitate translation=(0.014685 -0.03762 0.005032)
      PhysicalOffsetFrame secondmc_offset: socket_parent=/bodyset/secondmc translation=(0 0 0)
    WeldJoint CMC3: socket_parent_frame=capitate_offset socket_child_frame=thirdmc_offset
      PhysicalOffsetFrame capitate_offset: socket_parent=/bodyset/capitate translation=(0.000477 -0.039239 0.007377)
      PhysicalOffsetFrame thirdmc_offset: socket_parent=/bodyset/thirdmc translation=(0 0 0)
    CustomJoint CMC4: socket_parent_frame=capitate_offset socket_child_frame=fourthmc_offset
      Coordinate 4cmc_flexion: default_value=0.0001580928 range=(0 0.2032) clamped=true
      PhysicalOffsetFrame capitate_offset: socket_parent=/bodyset/capitate translation=(-0.0097 -0.0147 0.0015)
      PhysicalOffsetFrame fourthmc_offset: socket_parent=/bodyset/fourthmc translation=(0 0 0)
      SpatialTransform: axes_held_at_zero=(rotation2 rotation3 translation1 translation2 translation3)
        TransformAxis rotation1: coordinates=4cmc_flexion axis=(0.58 -0.8006 -0.1506) LinearFunction(coefficients=1 0)
    CustomJoint CMC5: socket_parent_frame=capitate_offset socket_child_frame=fifthmc_offset
      Coordinate CMC5_r1: default_value=0.0004300871 range=(-99999.9 99999.9) clamped=false
      PhysicalOffsetFrame capitate_offset: socket_parent=/bodyset/capitate translation=(-0.0171 -0.0118 -0.0036)
      PhysicalOffsetFrame fifthmc_offset: socket_parent=/bodyset/fifthmc translation=(0 0 0)
      SpatialTransform: axes_held_at_zero=(rotation2 rotation3 translation1 translation2 translation3)
        TransformAxis rotation1: coordinates=CMC5_r1 axis=(0.3718 -0.8665 0.3333) LinearFunction(coefficients=1 0)
    CustomJoint _2MCP: socket_parent_frame=secondmc_offset socket_child_frame=2proxph_offset
      Coordinate 2mcp_abduction: default_value=-8.68321e-29 range=(-0.2617994 0.2617994) clamped=false
      Coordinate 2mcp_flexion: default_value=8.748977e-9 range=(-0.7853982 1.570796) clamped=true
      PhysicalOffsetFrame secondmc_offset: socket_parent=/bodyset/secondmc translation=(0.003501 -0.028243 0.00362)
      PhysicalOffsetFrame 2proxph_offset: socket_parent=/bodyset/2proxph translation=(0 0 0)
      SpatialTransform: axes_held_at_zero=(rotation3 translation1 translation2 translation3)
        TransformAxis rotation1: coordinates=2mcp_abduction axis=(0.214609 0.191508 0.957741)
            LinearFunction(coefficients=1 0)
        TransformAxis rotation2: coordinates=2mcp_flexion axis=(0.9785767 0.02602229 -0.1973295)
            LinearFunction(coefficients=1 0)
    CustomJoint _2prox-midph_b: socket_parent_frame=2proxph_offset socket_child_frame=2midph_offset
      Coordinate 2pm_flexion: default_value=0.0001464264 range=(0 1.745329) clamped=true
      PhysicalOffsetFrame 2proxph_offset: socket_parent=/bodyset/2proxph translation=(0.007517 -0.041273 0.007326)
      PhysicalOffsetFrame 2midph_offset: socket_parent=/bodyset/2midph translation=(0 0 0)
      SpatialTransform: axes_held_at_zero=(rotation2 rotation3 translation1 translation2 translation3)
        TransformAxis rotation1: coordinates=2pm_flexion axis=(0.976336 0.1267122 -0.1753944)
            LinearFunction(coefficients=1 0)
    CustomJoint _2mid-distph: socket_parent_frame=2midph_offset socket_child_frame=2distph_offset
      Coordinate 2md_flexion: default_value=0.0001402316 range=(0 1.396263) clamped=true
      PhysicalOffsetFrame 2midph_offset: socket_parent=/bodyset/2midph translation=(0.003333 -0.024888 0.00122)
      PhysicalOffsetFrame 2distph_offset: socket_parent=/bodyset/2distph translation=(0 0 0)
      SpatialTransform: axes_held_at_zero=(rotation2 rotation3 translation1 translation2 translation3)
        TransformAxis rotation1: coordinates=2md_flexion axis=(0.9866912 0.1471512 0.07494557)
            LinearFunction(coefficients=1 0)
    CustomJoint _3MCP: socket_parent_frame=thirdmc_offset socket_child_frame=3proxph_offset
      Coordinate 3mcp_abduction: default_value=1.157066e-25 range=(-0.2617994 0.2617994) clamped=true
      Coordinate 3mcp_flexion: default_value=6.844315e-9 range=(-0.7853982 1.570796) clamped=true
      PhysicalOffsetFrame thirdmc_offset: socket_parent=/bodyset/thirdmc translation=(0.00024 -0.02629 0.001778)
      PhysicalOffsetFrame 3proxph_offset: socket_parent=/bodyset/3proxph translation=(0 0 0)
      SpatialTransform: axes_held_at_zero=(rotation3 translation1 translation2 translation3)
        TransformAxis rotation1: coordinates=3mcp_abduction axis=(-0.021499 0.118897 0.992674)
            LinearFunction(coefficients=1 0)
        TransformAxis rotation2: coordinates=3mcp_flexion axis=(0.9983488 0.0473371 -0.01041285)
            LinearFunction(coefficients=1 0)
    CustomJoint _3prox-midph_b: socket_parent_frame=3proxph_offset socket_child_frame=3midph_offset
      Coordinate 3pm_flexion: default_value=2.761928e-12 range=(0 1.745329) clamped=false
      PhysicalOffsetFrame 3proxph_offset: socket_parent=/bodyset/3proxph translation=(0.00165 -0.044211 0.00623)
      PhysicalOffsetFrame 3midph_offset: socket_parent=/bodyset/3midph translation=(0 0 0)
      SpatialTransform: axes_held_at_zero=(rotation2 rotation3 translation1 translation2 translation3)
        TransformAxis rotation1: coordinates=3pm_flexion axis=(0.992829 -0.062002 0.102203)
            LinearFunction(coefficients=1 0)
    CustomJoint _3mid-distph: socket_parent_frame=3midph_offset socket_child_frame=3distph_offset
      Coordinate 3md_flexion: default_value=0.0001197838 range=(0 1.396263) clamped=true
      PhysicalOffsetFrame 3midph_offset: socket_parent=/bodyset/3midph translation=(0.001365 -0.029047 0.001954)
      PhysicalOffsetFrame 3distph_offset: socket_parent=/bodyset/3distph translation=(0 0 0)
      SpatialTransform: axes_held_at_zero=(rotation2 rotation3 translation1 translation2 translation3)
        TransformAxis rotation1: coordinates=3md_flexion axis=(0.994589 0.036103 0.097409)
            LinearFunction(coefficients=1 0)
    CustomJoint _4MCP: socket_parent_frame=fourthmc_offset socket_child_frame=4proxph_offset
      Coordinate 4mcp_abduction: default_value=1.309426e-10 range=(-0.2617994 0.2617994) clamped=true
      Coordinate 4mcp_flexion: default_value=4.766837e-9 range=(-0.7853982 1.570796) clamped=true
      PhysicalOffsetFrame fourthmc_offset: socket_parent=/bodyset/fourthmc translation=(-0.0053 -0.0489 0.007)
      PhysicalOffsetFrame 4proxph_offset: socket_parent=/bodyset/4proxph translation=(0 0 0)
      SpatialTransform: axes_held_at_zero=(rotation3 translation1 translation2 translation3)
        TransformAxis rotation1: coordinates=4mcp_abduction axis=(-0.022094 0.144366 0.989278)
            LinearFunction(coefficients=1 0)
        TransformAxis rotation2: coordinates=4mcp_flexion axis=(0.9948176 -0.06526001 -0.02971703)
            LinearFunction(coefficients=1 0)
    CustomJoint _4prox-midph_b: socket_parent_frame=4proxph_offset socket_child_frame=4midph_offset
      Coordinate 4pm_flexion: default_value=-1.627947e-11 range=(0 1.745329) clamped=false
      PhysicalOffsetFrame 4proxph_offset: socket_parent=/bodyset/4proxph translation=(-0.0039 -0.0398 0.0057)
      PhysicalOffsetFrame 4midph_offset: socket_parent=/bodyset/4midph translation=(0 0 0)
      SpatialTransform: axes_held_at_zero=(rotation2 rotation3 translation1 translation2 translation3)
        TransformAxis rotation1: coordinates=4pm_flexion axis=(0.9958278 -0.03458071 0.09232488)
            LinearFunction(coefficients=1 0)
    CustomJoint _4mid-distph: socket_parent_frame=4midph_offset socket_child_frame=4distph_offset
      Coordinate 4md_flexion: default_value=-3.835448e-11 range=(0 1.396263) clamped=false
      PhysicalOffsetFrame 4midph_offset: socket_parent=/bodyset/4midph translation=(-0.0026 -0.0245 0.0033)
      PhysicalOffsetFrame 4distph_offset: socket_parent=/bodyset/4distph translation=(0 0 0)
      SpatialTransform: axes_held_at_zero=(rotation2 rotation3 translation1 translation2 translation3)
        TransformAxis rotation1: coordinates=4md_flexion axis=(0.9526 -0.14 0.2701) LinearFunction(coefficients=1 0)
    CustomJoint _5MCP: socket_parent_frame=fifthmc_offset socket_child_frame=5proxph_offset
      Coordinate 5mcp_abduction: default_value=-2.532864e-9 range=(-0.2617994 0.2617994) clamped=true
      Coordinate 5mcp_flexion: default_value=1.02388e-9 range=(-0.7853982 1.570796) clamped=true
      PhysicalOffsetFrame fifthmc_offset: socket_parent=/bodyset/fifthmc translation=(-0.0111 -0.0423 0.0097)
      PhysicalOffsetFrame 5proxph_offset: socket_parent=/bodyset/5proxph translation=(0 0 0)
      SpatialTransform: axes_held_at_zero=(rotation3 translation1 translation2 translation3)
        TransformAxis rotation1: coordinates=5mcp_abduction axis=(-0.025001 0.216206 0.976028)
            LinearFunction(coefficients=1 0)
        TransformAxis rotation2: coordinates=5mcp_flexion axis=(0.9715007 -0.2128172 -0.03446347)
            LinearFunction(coefficients=1 0)
    CustomJoint _5prox-midph_b: socket_parent_frame=5proxph_offset socket_child_frame=5midph_offset
      Coordinate 5pm_flexion: default_value=4.877877e-5 range=(0 1.745329) clamped=true
      PhysicalOffsetFrame 5proxph_offset: socket_parent=/bodyset/5proxph translation=(-0.0125 -0.0335 0.0043)
      PhysicalOffsetFrame 5midph_offset: socket_parent=/bodyset/5midph translation=(0 0 0)
      SpatialTransform: axes_held_at_zero=(rotation2 rotation3 translation1 translation2 translation3)
        TransformAxis rotation1: coordinates=5pm_flexion axis=(0.9287097 -0.3277133 0.1765911)
            LinearFunction(coefficients=1 0)
    CustomJoint _5mid-distph: socket_parent_frame=5midph_offset socket_child_frame=5distph_offset
      Coordinate 5md_flexion: default_value=3.014571e-5 range=(0 1.396263) clamped=true
      PhysicalOffsetFrame 5midph_offset: socket_parent=/bodyset/5midph translation=(-0.0075 -0.0195 0.002)
      PhysicalOffsetFrame 5distph_offset: socket_parent=/bodyset/5distph translation=(0 0 0)
      SpatialTransform: axes_held_at_zero=(rotation2 rotation3 translation1 translation2 translation3)
        TransformAxis rotation1: coordinates=5md_flexion axis=(0.892729 -0.426766 0.144588)
            LinearFunction(coefficients=1 0)
  ConstraintSet:
    CoordinateCouplerConstraint [values shared by the 14 below unless stated]: independent_coordinate_names=shoulder_elv
    CoordinateCouplerConstraint sternoclavicular_r2_con: dependent_coordinate_name=sternoclavicular_r2 scale_factor=1
      coupled_coordinates_function: SimmSpline: x=(0 2.61799) y=(0 -0.633555)
    CoordinateCouplerConstraint sternoclavicular_r3_con: dependent_coordinate_name=sternoclavicular_r3 scale_factor=1
      coupled_coordinates_function: SimmSpline: x=(0 3.14159) y=(0 0.322013)
    CoordinateCouplerConstraint unrotscap_r2_con: dependent_coordinate_name=unrotscap_r2 scale_factor=1
      coupled_coordinates_function: SimmSpline: x=(0 2.61799) y=(0 0.633555)
    CoordinateCouplerConstraint unrotscap_r3_con: dependent_coordinate_name=unrotscap_r3 scale_factor=1
      coupled_coordinates_function: SimmSpline: x=(0 3.14159) y=(0 -0.322013)
    CoordinateCouplerConstraint acromioclavicular_r1_con: dependent_coordinate_name=acromioclavicular_r1 scale_factor=1
      coupled_coordinates_function: SimmSpline: x=(0 2.61799) y=(0 0.466003)
    CoordinateCouplerConstraint acromioclavicular_r2_con: dependent_coordinate_name=acromioclavicular_r2 scale_factor=1
      coupled_coordinates_function: SimmSpline: x=(0 2.61799) y=(0 -0.128282)
    CoordinateCouplerConstraint acromioclavicular_r3_con: dependent_coordinate_name=acromioclavicular_r3 scale_factor=1
      coupled_coordinates_function: SimmSpline: x=(0 2.61799) y=(0 1.03673)
    CoordinateCouplerConstraint unrothum_r1_con: dependent_coordinate_name=unrothum_r1 scale_factor=1
      coupled_coordinates_function: SimmSpline: x=(0 2.61799) y=(0 -0.466003)
    CoordinateCouplerConstraint unrothum_r2_con: dependent_coordinate_name=unrothum_r2 scale_factor=1
      coupled_coordinates_function: SimmSpline: x=(0 2.61799) y=(0 0.128282)
    CoordinateCouplerConstraint unrothum_r3_con: dependent_coordinate_name=unrothum_r3 scale_factor=1
      coupled_coordinates_function: SimmSpline: x=(0 2.61799) y=(0 -1.03673)
    CoordinateCouplerConstraint shoulder1_r2_con: independent_coordinate_names=elv_angle
        dependent_coordinate_name=shoulder1_r2 scale_factor=1
      coupled_coordinates_function: SimmSpline: x=(-1.5708 3.14159) y=(1.5708 -3.14159)
    CoordinateCouplerConstraint CMC5_r1_con: independent_coordinate_names=4cmc_flexion
        dependent_coordinate_name=CMC5_r1
      coupled_coordinates_function: SimmSpline: x=(0 0.2032) y=(0 0.5528)
    CoordinateCouplerConstraint wrist_hand_r1_con: independent_coordinate_names=deviation
        dependent_coordinate_name=wrist_hand_r1 scale_factor=1
      coupled_coordinates_function: SimmSpline f18: x=(-0.174533 0 0.436332) y=(-0.261799 0 0.436332)
    CoordinateCouplerConstraint wrist_hand_r3_con: independent_coordinate_names=flexion
        dependent_coordinate_name=wrist_hand_r3 scale_factor=1
      coupled_coordinates_function: SimmSpline f19: x=(-1.22173 1.22173) y=(-0.610865 0.610865)
  ForceSet:
    Ligament s_glenohum: resting_length=0.0448 pcsa_force=566.11
      PathPoint P1: humerus (0.018 0.011 -0.009)
      PathPoint P2: scapula (-0.016 -0.023 -0.017)
      PathWrap: wrap_object=LIGhh_s method=midpoint
      force_length_curve: SimmSpline: x=(0 0.5 0.8 1 1.01 1.02 1.03 1.04 1.05 1.06 1.07 1.1 1.13 1.15 1.2 1.4 1.7 2)
          y=(0 0 0 0 0.00083333 0.00333333 0.0075 0.0133333 0.0208333 0.03 0.04 0.07 0.1 0.12 0.17 0.37 0.67 0.97)
    Ligament m_glenohum: resting_length=0.0452 pcsa_force=527.219
      PathPoint P1: humerus (0.016 0.003 -0.012)
      PathPoint P2: scapula (-0.014 -0.03 -0.019)
      PathWrap: wrap_object=LIGhh_mi method=midpoint
      force_length_curve: SimmSpline: x=(0 0.5 0.8 1 1.01 1.02 1.03 1.04 1.05 1.06 1.07 1.1 1.13 1.15 1.2 1.4 1.7 2)
          y=(0 0 0 0 0.00083333 0.00333333 0.0075 0.0133333 0.0208333 0.03 0.04 0.07 0.1 0.12 0.17 0.37 0.67 0.97)
    Ligament i_glenohum: resting_length=0.0421 pcsa_force=488.328
      PathPoint P1: humerus (0.009 -0.003 -0.018)
      PathPoint P2: scapula (-0.02 -0.036 -0.02)
      PathWrap: wrap_object=LIGhh_mi method=midpoint
      force_length_curve: SimmSpline: x=(0 0.5 0.8 1 1.01 1.02 1.03 1.04 1.05 1.06 1.07 1.1 1.13 1.15 1.2 1.4 1.7 2)
          y=(0 0 0 0 0.00083333 0.00333333 0.0075 0.0133333 0.0208333 0.03 0.04 0.07 0.1 0.12 0.17 0.37 0.67 0.97)
    Ligament coracohum: resting_length=0.0501 pcsa_force=1120.87
      PathPoint P1: humerus (0.02 0.011 -0.003)
      PathPoint P2: scapula (-0.006 -0.026 -0.025)
      PathWrap: wrap_object=LIGhh_s method=hybrid
      force_length_curve: SimmSpline: x=(0 0.5 0.8 1 1.01 1.02 1.03 1.04 1.05 1.06 1.07 1.1 1.13 1.15 1.2 1.4 1.7 2)
          y=(0 0 0 0 0.00083333 0.00333333 0.0075 0.0133333 0.0208333 0.03 0.04 0.07 0.1 0.12 0.17 0.37 0.67 0.97)
    CoordinateLimitForce shoulder_elv_ligaments: coordinate=shoulder_elv upper_stiffness=100 [N*m/degree]
        upper_limit=150 [degrees] lower_stiffness=100 [N*m/degree] lower_limit=30 [degrees] damping=0
        transition=542.8423 [degrees]
    CoordinateLimitForce shoulder_elv_damping: coordinate=shoulder_elv upper_stiffness=1e-8 upper_limit=190
        lower_stiffness=1e-8 lower_limit=190 damping=0.001745 transition=1
    CoordinateLimitForce elv_angle_ligaments: coordinate=elv_angle upper_stiffness=100 upper_limit=100
        lower_stiffness=100 lower_limit=-60 damping=0 transition=545.4471
    CoordinateLimitForce elv_angle_damping: coordinate=elv_angle upper_stiffness=1e-8 upper_limit=190
        lower_stiffness=1e-8 lower_limit=190 damping=0.001745 transition=1
    CoordinateLimitForce shoulder_rot_ligaments: coordinate=shoulder_rot upper_stiffness=100 upper_limit=90
        lower_stiffness=100 lower_limit=-60 damping=0 transition=485.466
    CoordinateLimitForce shoulder_rot_damping: coordinate=shoulder_rot upper_stiffness=1e-8 upper_limit=190
        lower_stiffness=1e-8 lower_limit=190 damping=0.001745 transition=1
    CoordinateLimitForce elbow_flexion_ligaments: coordinate=elbow_flexion upper_stiffness=0.3037 upper_limit=85
        lower_stiffness=100 lower_limit=14 damping=0 transition=139.5813
    CoordinateLimitForce elbow_flexion_damping: coordinate=elbow_flexion upper_stiffness=1e-8 upper_limit=190
        lower_stiffness=1e-8 lower_limit=190 damping=0.001745 transition=1
    CoordinateLimitForce pro_sup_ligaments: coordinate=pro_sup upper_stiffness=50 upper_limit=60 lower_stiffness=50
        lower_limit=-60 damping=0 transition=430.1186
    CoordinateLimitForce pro_sup_damping: coordinate=pro_sup upper_stiffness=1e-8 upper_limit=190 lower_stiffness=1e-8
        lower_limit=190 damping=0.001745 transition=1
    CoordinateLimitForce deviation_ligaments: coordinate=deviation upper_stiffness=3013.535 upper_limit=0.3490659
        lower_stiffness=27913.13 lower_limit=-0.1047198 damping=0 transition=0.6834465
    CoordinateLimitForce deviation_damping: coordinate=deviation upper_stiffness=5.729578e-7 upper_limit=3.316126
        lower_stiffness=5.729578e-7 lower_limit=3.316126 damping=0.09998114 transition=0.01745329
    CoordinateLimitForce flexion_ligaments: coordinate=flexion upper_stiffness=11459.16 upper_limit=1.047198
        lower_stiffness=7753.448 lower_limit=-1.047198 damping=0 transition=1.62169
    CoordinateLimitForce flexion_damping: coordinate=flexion upper_stiffness=5.729578e-7 upper_limit=3.316126
        lower_stiffness=5.729578e-7 lower_limit=3.316126 damping=0.02499987 transition=0.01745329
    Millard2012EquilibriumMuscle [values shared by the 69 below unless stated]:
      ActiveForceLengthCurve: min_norm_active_fiber_length=0.4327 transition_norm_fiber_length=0.728
          max_norm_active_fiber_length=1.595 shallow_ascending_slope=0.4613 minimum_value=0
      ForceVelocityCurve: concentric_slope_at_vmax=0 concentric_slope_near_vmax=0.25 isometric_slope=5
          eccentric_slope_at_vmax=0 eccentric_slope_near_vmax=0.15 max_eccentric_velocity_force_multiplier=1.4
      FiberForceLengthCurve: strain_at_zero_force=0 strain_at_one_norm_force=0.6405 stiffness_at_low_force=0.0751
          stiffness_at_one_norm_force=6.3163 curviness=0.6658
      TendonForceLengthCurve: strain_at_one_norm_force=0.033 stiffness_at_one_norm_force=37.393
          norm_force_at_toe_end=0.2255 curviness=0.4504
    Millard2012EquilibriumMuscle DELT1: max_isometric_force=1218.9 optimal_fiber_length=0.0976
        tendon_slack_length=0.093 pennation_angle_at_optimal=0.3839724 [radians] max_contraction_velocity=10
        default_activation=1 minimum_activation=0
      PathPoint P1: humerus (0.00896 -0.11883 0.00585)
      PathPoint P2: humerus (0.01623 -0.11033 0.00412)
      PathPoint P3: scapula (0.04347 -0.03202 0.00499)
      PathPoint P4: clavicle (-0.014 0.01106 0.08021)
      PathWrap: wrap_object=delt2hum method=hybrid
      PathWrap pathwrap_0: wrap_object=DELT1hh method=hybrid range=(2 3)
    Millard2012EquilibriumMuscle DELT2: max_isometric_force=1103.5 optimal_fiber_length=0.1078
        tendon_slack_length=0.1095 pennation_angle_at_optimal=0.2617994 max_contraction_velocity=10
        default_activation=1 minimum_activation=0
      PathPoint P1: humerus (0.00461 -0.13611 0.0056)
      MovingPathPoint default: humerus socket_x_coordinate=/jointset/shoulder2/shoulder_rot
          socket_y_coordinate=/jointset/shoulder2/shoulder_rot socket_z_coordinate=/jointset/shoulder2/shoulder_rot
          x_location=PiecewiseLinearFunction(x=-1.5708 0.349066, y=0.03804 0)
        y_location: PiecewiseLinearFunction: x=(-1.5708 0.349066) y=(-0.0619 -0.06012)
        z_location: SimmSpline: x=(-1.5708 -0.851248 0.349066) y=(0.00208 0.0203027 0.02532)
      PathPoint P3: scapula (5e-5 0.00294 0.02233)
      PathPoint P4: scapula (-0.01078 -0.00034 0.0062)
      PathWrap: wrap_object=Deltoid2 method=hybrid
      PathWrap pathwrap_0: wrap_object=delt2hum method=hybrid
      PathWrap pathwrap_1: wrap_object=DELT_TMAJ_LAT_PEC_CORBhh method=hybrid
    Millard2012EquilibriumMuscle DELT3: max_isometric_force=201.6 optimal_fiber_length=0.1367 tendon_slack_length=0.038
        pennation_angle_at_optimal=0.3141593 max_contraction_velocity=10 default_activation=1 minimum_activation=0
      PathPoint P1: scapula (-0.05573 0.00122 -0.02512)
      PathPoint P2: scapula (-0.07247 -0.03285 0.01233)
      PathPoint P3: humerus (0.00206 -0.07602 0.01045)
      PathWrap: wrap_object=Delt3 method=hybrid range=(1 2)
      PathWrap pathwrap_0: wrap_object=delt3hum method=hybrid
      PathWrap pathwrap_1: wrap_object=DELT_TMAJ_LAT_PEC_CORBhh method=hybrid
    Millard2012EquilibriumMuscle SUPSP: max_isometric_force=499.2 optimal_fiber_length=0.0682
        tendon_slack_length=0.0395 pennation_angle_at_optimal=0.1221731 max_contraction_velocity=10
        default_activation=1 minimum_activation=0
      PathPoint P1: humerus (0.00256 0.01063 0.02593)
      PathPoint P2: scapula (-0.01918 0.00127 -0.01271)
      PathPoint P3: scapula (-0.044 -0.01512 -0.05855)
      PathWrap: wrap_object=SUPSP method=hybrid
    Millard2012EquilibriumMuscle INFSP: max_isometric_force=1075.8 optimal_fiber_length=0.0755
        tendon_slack_length=0.0308 pennation_angle_at_optimal=0.3316126 max_contraction_velocity=10
        default_activation=1 minimum_activation=0
      PathPoint P1: humerus (-0.00887 0.00484 0.02448)
      PathPoint P2: scapula (-0.07382 -0.05476 -0.04781)
      PathWrap: wrap_object=INFSP method=hybrid
      PathWrap pathwrap_0: wrap_object=infsp_new method=hybrid
    Millard2012EquilibriumMuscle SUBSC: max_isometric_force=1306.9 optimal_fiber_length=0.0873
        tendon_slack_length=0.033 pennation_angle_at_optimal=0.3490659 max_contraction_velocity=10 default_activation=1
        minimum_activation=0
      PathPoint P1: humerus (0.01403 0.0084 -0.01331)
      PathPoint P2: scapula (-0.01831 -0.05223 -0.02457)
      PathPoint P3: scapula (-0.07246 -0.03943 -0.06475)
      PathWrap: wrap_object=SUBSCAP method=hybrid
    Millard2012EquilibriumMuscle TMIN: max_isometric_force=269.5 optimal_fiber_length=0.0741 tendon_slack_length=0.0713
        pennation_angle_at_optimal=0.418879 max_contraction_velocity=10 default_activation=1 minimum_activation=0
      PathPoint P1: humerus (-0.00127 -0.01259 0.022)
      PathPoint P2: scapula (-0.09473 -0.07991 -0.04737)
      PathPoint P3: scapula (-0.09643 -0.08121 -0.05298)
      PathWrap: wrap_object=TMIN method=hybrid range=(1 2)
      PathWrap pathwrap_0: wrap_object=INFSP_and_TMIN_hum_head method=hybrid range=(1 2)
      PathWrap pathwrap_1: wrap_object=TMINhum method=hybrid range=(1 2)
    Millard2012EquilibriumMuscle TMAJ: max_isometric_force=144 optimal_fiber_length=0.1624 tendon_slack_length=0.02
        pennation_angle_at_optimal=0.2792527 max_contraction_velocity=10 default_activation=1 minimum_activation=0
      PathPoint P1: humerus (0.00998 -0.05419 -0.00568)
      ConditionalPathPoint default: humerus (0.009 -0.054 -0.009) socket_coordinate=/jointset/shoulder2/shoulder_rot
          range=(0.261799 2.0944) [radians]
      ConditionalPathPoint default_0: humerus (0.009 -0.054 -0.009) socket_coordinate=/jointset/shoulder0/elv_angle
          range=(-1.65806 -0.174533)
      PathPoint P2: scapula (-0.10264 -0.10319 -0.05829)
      PathPoint P3: scapula (-0.10489 -0.10895 -0.07117)
      PathWrap: wrap_object=TMAJ_LAThum method=hybrid
      PathWrap pathwrap_0: wrap_object=LAT_TMAJhh method=hybrid range=(1 4)
      PathWrap pathwrap_1: wrap_object=LAT_TMAJ2hh method=hybrid
    Millard2012EquilibriumMuscle PECM1: max_isometric_force=444.3 optimal_fiber_length=0.1442
        tendon_slack_length=0.0028 pennation_angle_at_optimal=0.296706 max_contraction_velocity=10
        ignore_tendon_compliance=true default_activation=1 minimum_activation=0
      PathPoint P1: humerus (0.01169 -0.04191 0.0078)
      MovingPathPoint default: humerus socket_x_coordinate=/jointset/shoulder1/shoulder_elv
          socket_y_coordinate=/jointset/shoulder1/shoulder_elv socket_z_coordinate=/jointset/shoulder1/shoulder_elv
          x_location=PiecewiseLinearFunction(x=0 3.14159, y=0.01615 0.02205)
          y_location=PiecewiseLinearFunction(x=0 3.14159, y=-0.04045 -0.01975)
          z_location=PiecewiseLinearFunction(x=0 3.14159, y=-0.00577 0.00863)
      MovingPathPoint default_0: ground socket_x_coordinate=/jointset/shoulder1/shoulder_elv
          socket_y_coordinate=/jointset/shoulder1/shoulder_elv socket_z_coordinate=/jointset/shoulder1/shoulder_elv
          x_location=PiecewiseLinearFunction(x=0 3.14159, y=0.00958 -0.00972)
          y_location=PiecewiseLinearFunction(x=0 3.14159, y=-0.01509 0.03151)
          z_location=PiecewiseLinearFunction(x=0 3.14159, y=0.12664 0.08244)
      PathPoint P2: clavicle (0.00321 -0.00013 0.05113)
      PathWrap: wrap_object=Thorax method=hybrid
      PathWrap pathwrap_0: wrap_object=PEC12hum method=hybrid range=(2 3)
      PathWrap pathwrap_1: wrap_object=PEC1hh method=hybrid
    Millard2012EquilibriumMuscle PECM2: max_isometric_force=658.3 optimal_fiber_length=0.1385 tendon_slack_length=0.089
        pennation_angle_at_optimal=0.4537856 max_contraction_velocity=10 default_activation=1 minimum_activation=0
      PathPoint P1: humerus (0.01274 -0.04289 0.00785)
      MovingPathPoint default: humerus socket_x_coordinate=/jointset/shoulder1/shoulder_elv
          socket_y_coordinate=/jointset/shoulder1/shoulder_elv socket_z_coordinate=/jointset/shoulder1/shoulder_elv
          x_location=PiecewiseLinearFunction(x=0 3.14159, y=0.01453 0.02043)
          y_location=PiecewiseLinearFunction(x=0 3.14159, y=-0.04568 -0.02498)
          z_location=PiecewiseLinearFunction(x=0 3.14159, y=-0.00687 0.00753)
      MovingPathPoint default_0: ground socket_x_coordinate=/jointset/shoulder1/shoulder_elv
          socket_y_coordinate=/jointset/shoulder1/shoulder_elv socket_z_coordinate=/jointset/shoulder1/shoulder_elv
          x_location=PiecewiseLinearFunction(x=0 3.14159, y=0.02018 0.02148)
          y_location=PiecewiseLinearFunction(x=0 3.14159, y=-0.04165 0.00155)
          z_location=PiecewiseLinearFunction(x=0 3.14159, y=0.1269 0.1042)
      PathPoint P4: ground (0.03091 -0.03922 0.09705)
      PathPoint P5: ground (0.02769 -0.04498 0.02271)
      PathWrap: wrap_object=Thorax method=hybrid
      PathWrap pathwrap_0: wrap_object=PEC12hum method=hybrid range=(2 3)
      PathWrap pathwrap_1: wrap_object=TMAJ_LAT_PEC_CORBhh method=hybrid
      PathWrap pathwrap_2: wrap_object=PEC23hh method=hybrid
    Millard2012EquilibriumMuscle PECM3: max_isometric_force=498.1 optimal_fiber_length=0.1385 tendon_slack_length=0.132
        pennation_angle_at_optimal=0.4363323 max_contraction_velocity=10 default_activation=1 minimum_activation=0
      PathPoint P1: humerus (0.01269 -0.04375 0.0075)
      MovingPathPoint default: humerus socket_x_coordinate=/jointset/shoulder1/shoulder_elv
          socket_y_coordinate=/jointset/shoulder1/shoulder_elv socket_z_coordinate=/jointset/shoulder1/shoulder_elv
          y_location=PiecewiseLinearFunction(x=0 3.13149, y=-0.05157 -0.040096)
        x_location: SimmSpline: x=(0 0.747517 3.14159) y=(0.01243 0.014912 0.01833)
        z_location: SimmSpline: x=(0 0.623056 2.29124 3.12533) y=(-0.01807 -0.008102 0.000123 -0.000324)
      MovingPathPoint default_0: ground socket_x_coordinate=/jointset/shoulder1/shoulder_elv
          socket_y_coordinate=/jointset/shoulder1/shoulder_elv socket_z_coordinate=/jointset/shoulder1/shoulder_elv
          x_location=PiecewiseLinearFunction(x=0 3.14159, y=0.02984 0.02984)
          z_location=PiecewiseLinearFunction(x=0 3.14159, y=0.1151 0.1151)
        y_location: SimmSpline: x=(0.0101016 1.59605 3.14159) y=(-0.070778 -0.059781 -0.0269)
      PathPoint P4: ground (0.0525 -0.08417 0.08935)
      PathPoint P5: ground (0.05724 -0.11654 0.03787)
      PathWrap: wrap_object=Thorax method=hybrid
      PathWrap pathwrap_0: wrap_object=PEC3hum method=hybrid range=(2 3)
      PathWrap pathwrap_1: wrap_object=PEC23hh method=hybrid
    Millard2012EquilibriumMuscle LAT1: max_isometric_force=290.5 optimal_fiber_length=0.254 tendon_slack_length=0.12
        pennation_angle_at_optimal=0.4363323 max_contraction_velocity=10 default_activation=1 minimum_activation=0
      PathPoint P1: humerus (0.0105 -0.03415 -0.00653)
      ConditionalPathPoint default: humerus (0.01 -0.035 -0.00889323)
          socket_coordinate=/jointset/shoulder2/shoulder_rot range=(0.523599 2.0944)
      ConditionalPathPoint default_0: humerus (0.01 -0.035 -0.009) socket_coordinate=/jointset/shoulder0/elv_angle
          range=(-1.65806 -0.174533)
      MovingPathPoint default_1: scapula socket_x_coordinate=/jointset/shoulder1/shoulder_elv
          socket_y_coordinate=/jointset/shoulder1/shoulder_elv socket_z_coordinate=/jointset/shoulder1/shoulder_elv
          x_location=PiecewiseLinearFunction(x=0 3.14159, y=-0.07947 -0.08157)
          y_location=PiecewiseLinearFunction(x=0 3.14159, y=-0.08581 -0.05061)
          z_location=PiecewiseLinearFunction(x=0 3.14159, y=-0.02188 -0.03628)
      MovingPathPoint default_2: scapula socket_x_coordinate=/jointset/shoulder1/shoulder_elv
          socket_y_coordinate=/jointset/shoulder1/shoulder_elv socket_z_coordinate=/jointset/shoulder1/shoulder_elv
          x_location=PiecewiseLinearFunction(x=0 3.14159, y=-0.11215 -0.10635)
          y_location=PiecewiseLinearFunction(x=0 3.14159, y=-0.09779 -0.04699)
          z_location=PiecewiseLinearFunction(x=0 3.14159, y=-0.05322 -0.09522)
      PathPoint P4: ground (-0.11828 -0.10118 0.03316)
      PathPoint P5: ground (-0.09578 -0.11724 0.00882)
      PathWrap: wrap_object=TMAJ_LAThum method=hybrid
      PathWrap pathwrap_0: wrap_object=LAT_TMAJhh method=hybrid range=(1 4)
      PathWrap pathwrap_1: wrap_object=LAT_TMAJ2hh method=hybrid
    Millard2012EquilibriumMuscle LAT2: max_isometric_force=317.5 optimal_fiber_length=0.2324 tendon_slack_length=0.1765
        pennation_angle_at_optimal=0.3316126 max_contraction_velocity=10 default_activation=1 minimum_activation=0
      PathPoint P1: humerus (0.00968 -0.04071 -0.00611)
      ConditionalPathPoint default: humerus (0.008 -0.043 -0.01) socket_coordinate=/jointset/shoulder2/shoulder_rot
          range=(0.349066 2.0944)
      ConditionalPathPoint default_0: humerus (0.00799949 -0.0433861 -0.0100971)
          socket_coordinate=/jointset/shoulder0/elv_angle range=(-1.65806 -0.174533)
      MovingPathPoint default_1: scapula socket_x_coordinate=/jointset/shoulder1/shoulder_elv
          socket_y_coordinate=/jointset/shoulder1/shoulder_elv socket_z_coordinate=/jointset/shoulder1/shoulder_elv
          x_location=PiecewiseLinearFunction(x=0 3.14159, y=-0.0764 -0.0905)
          y_location=PiecewiseLinearFunction(x=0 3.14159, y=-0.1022 -0.0717)
          z_location=PiecewiseLinearFunction(x=0 3.14159, y=-0.01808 -0.03098)
      MovingPathPoint default_2: scapula socket_x_coordinate=/jointset/shoulder1/shoulder_elv
          socket_y_coordinate=/jointset/shoulder1/shoulder_elv socket_z_coordinate=/jointset/shoulder1/shoulder_elv
          x_location=PiecewiseLinearFunction(x=0 3.14159, y=-0.10054 -0.12994)
          y_location=PiecewiseLinearFunction(x=0 3.14159, y=-0.13969 -0.07529)
          z_location=PiecewiseLinearFunction(x=0 3.14159, y=-0.05258 -0.12468)
      PathPoint P4: ground (-0.10992 -0.16908 0.02878)
      PathPoint P5: ground (-0.07186 -0.18818 0.00815)
      PathWrap: wrap_object=TMAJ_LAThum method=hybrid
      PathWrap pathwrap_0: wrap_object=LAT_TMAJhh method=hybrid range=(1 4)
      PathWrap pathwrap_1: wrap_object=LAT_TMAJ2hh method=hybrid
    Millard2012EquilibriumMuscle LAT3: max_isometric_force=189 optimal_fiber_length=0.2789 tendon_slack_length=0.1403
        pennation_angle_at_optimal=0.3665191 max_contraction_velocity=10 default_activation=1 minimum_activation=0
      PathPoint P1: humerus (0.01208 -0.03922 -0.00416)
      ConditionalPathPoint default: humerus (0.01 -0.041 -0.009) socket_coordinate=/jointset/shoulder2/shoulder_rot
          range=(0.174533 2.0944)
      ConditionalPathPoint default_0: humerus (0.01 -0.041 -0.009) socket_coordinate=/jointset/shoulder0/elv_angle
          range=(-1.65806 -0.0872665)
      MovingPathPoint default_1: scapula socket_x_coordinate=/jointset/shoulder1/shoulder_elv
          socket_y_coordinate=/jointset/shoulder1/shoulder_elv socket_z_coordinate=/jointset/shoulder1/shoulder_elv
          x_location=PiecewiseLinearFunction(x=0 3.14159, y=-0.05678 -0.11198)
          y_location=PiecewiseLinearFunction(x=0 3.14159, y=-0.13303 -0.09893)
          z_location=PiecewiseLinearFunction(x=0 3.14159, y=-0.0213 -0.0386)
      MovingPathPoint default_2: scapula socket_x_coordinate=/jointset/shoulder1/shoulder_elv
          socket_y_coordinate=/jointset/shoulder1/shoulder_elv socket_z_coordinate=/jointset/shoulder1/shoulder_elv
          x_location=PiecewiseLinearFunction(x=0 3.14159, y=-0.09449 -0.13109)
          y_location=PiecewiseLinearFunction(x=0 3.14159, y=-0.17553 -0.10113)
          z_location=PiecewiseLinearFunction(x=0 3.14159, y=-0.04406 -0.13416)
      PathPoint P4: ground (-0.11157 -0.19387 0.05532)
      PathPoint P5: ground (-0.07117 -0.24858 0.00907)
      PathWrap: wrap_object=TMAJ_LAThum method=hybrid
      PathWrap pathwrap_0: wrap_object=LAT_TMAJhh method=hybrid range=(1 4)
      PathWrap pathwrap_1: wrap_object=LAT_TMAJ2hh method=hybrid
    Millard2012EquilibriumMuscle CORB: max_isometric_force=208.2 optimal_fiber_length=0.0932 tendon_slack_length=0.097
        pennation_angle_at_optimal=0.4712389 max_contraction_velocity=10 default_activation=1 minimum_activation=0
      PathPoint P1: scapula (0.0125 -0.04127 -0.02652)
      PathPoint P2: scapula (0.00483 -0.06958 -0.01563)
      PathPoint P3: humerus (0.00743 -0.15048 -0.00782)
      PathWrap: wrap_object=CORBhum method=hybrid
      PathWrap pathwrap_0: wrap_object=TMAJ_LAT_PEC_CORBhh method=hybrid
    Millard2012EquilibriumMuscle TRIlong: max_isometric_force=771.8 optimal_fiber_length=0.134
        tendon_slack_length=0.143 pennation_angle_at_optimal=0.2094395 max_contraction_velocity=10 default_activation=1
        minimum_activation=0
      PathPoint P1: scapula (-0.04565 -0.04073 -0.01377)
      PathPoint P2: humerus (-0.02714 -0.11441 -0.00664)
      PathPoint P3: humerus (-0.03184 -0.22637 -0.01217)
      PathPoint P4: humerus (-0.01743 -0.26757 -0.01208)
      PathPoint P5: ulna (-0.0219 0.01046 -0.00078)
      PathWrap: wrap_object=TRI method=hybrid
      PathWrap pathwrap_0: wrap_object=TRIlonghh method=hybrid
      PathWrap pathwrap_1: wrap_object=TRIlongglen method=hybrid range=(1 2)
    Millard2012EquilibriumMuscle TRIlat: max_isometric_force=717.5 optimal_fiber_length=0.1138
        tendon_slack_length=0.098 pennation_angle_at_optimal=0.1570796 max_contraction_velocity=10 default_activation=1
        minimum_activation=0
      PathPoint P1: humerus (-0.00599 -0.12646 0.00428)
      PathPoint P2: humerus (-0.02344 -0.14528 0.00928)
      PathPoint P3: humerus (-0.03184 -0.22637 -0.01217)
      PathPoint P4: humerus (-0.01743 -0.26757 -0.01208)
      PathPoint P5: ulna (-0.0219 0.01046 -0.00078)
      PathWrap: wrap_object=TRI method=hybrid
    Millard2012EquilibriumMuscle TRImed: max_isometric_force=717.5 optimal_fiber_length=0.1138
        tendon_slack_length=0.0908 pennation_angle_at_optimal=0.1570796 max_contraction_velocity=10
        default_activation=1 minimum_activation=0
      PathPoint P1: humerus (-0.00838 -0.13695 -0.00906)
      PathPoint P2: humerus (-0.02601 -0.15139 -0.0108)
      PathPoint P3: humerus (-0.03184 -0.22637 -0.01217)
      PathPoint P4: humerus (-0.01743 -0.26757 -0.01208)
      PathPoint P5: ulna (-0.0219 0.01046 -0.00078)
      PathWrap: wrap_object=TRI method=hybrid
    Millard2012EquilibriumMuscle ANC: max_isometric_force=283.2 optimal_fiber_length=0.027 tendon_slack_length=0.018
        pennation_angle_at_optimal=0 max_contraction_velocity=10 default_activation=1 minimum_activation=0
      PathPoint P1: humerus (-0.00744 -0.28359 0.00979)
      PathPoint P2: ulna (-0.02532 -0.00124 0.006)
      PathWrap: wrap_object=ANC method=hybrid
    Millard2012EquilibriumMuscle SUP: max_isometric_force=379.6 optimal_fiber_length=0.033 tendon_slack_length=0.028
        pennation_angle_at_optimal=0 max_contraction_velocity=10 default_activation=1 minimum_activation=0
      PathPoint P1: radius (0.00996 -0.06096 0.00075)
      PathPoint P2: radius (0.01201 -0.0517 -0.00107)
      PathPoint P3: ulna (-0.0136 -0.03384 0.02013)
      PathWrap: wrap_object=SUP method=hybrid
    Millard2012EquilibriumMuscle BIClong: max_isometric_force=525.1 optimal_fiber_length=0.1157
        tendon_slack_length=0.2723 pennation_angle_at_optimal=0 max_contraction_velocity=10 default_activation=1
        minimum_activation=0
      PathPoint P1: scapula (-0.03123 -0.02353 -0.01305)
      PathPoint P2: scapula (-0.02094 -0.01309 -0.00461)
      PathPoint P3: humerus (0.02131 0.01793 0.01028)
      PathPoint P4: humerus (0.02378 -0.00511 0.01201)
      PathPoint P5: humerus (0.01345 -0.02827 0.00136)
      PathPoint P6: humerus (0.01068 -0.07736 -0.00165)
      PathPoint P7: humerus (0.01703 -0.12125 0.00024)
      PathPoint P8: humerus (0.0228 -0.1754 -0.0063)
      MovingPathPoint default: radius socket_x_coordinate=/jointset/radioulnar/pro_sup
          socket_y_coordinate=/jointset/radioulnar/pro_sup socket_z_coordinate=/jointset/radioulnar/pro_sup
        x_location: SimmSpline: x=(-1.57561 1.57823) y=(-0.0055 0.01096)
        y_location: PiecewiseLinearFunction: x=(-1.57561 0 1.57561) y=(-0.0282 -0.035 -0.0392)
        z_location: SimmSpline: x=(-1.57561 0.0866167 1.57561) y=(-0.01 -0.01358 -0.01083)
      PathPoint P11: radius (-0.002 -0.0375 -0.002)
      PathWrap: wrap_object=Elbow_BIC_BRD method=hybrid
      PathWrap pathwrap_0: wrap_object=BIClong method=hybrid range=(2 5)
    Millard2012EquilibriumMuscle BICshort: max_isometric_force=316.8 optimal_fiber_length=0.1321
        tendon_slack_length=0.1923 pennation_angle_at_optimal=0 max_contraction_velocity=10 default_activation=1
        minimum_activation=0
      PathPoint P1: scapula (0.01268 -0.03931 -0.02625)
      PathPoint P2: scapula (0.00093 -0.06704 -0.01593)
      PathPoint P3: humerus (0.01117 -0.07576 -0.01101)
      PathPoint P4: humerus (0.01703 -0.12125 -0.01079)
      PathPoint P5: humerus (0.0228 -0.1754 -0.0063)
      MovingPathPoint default: radius socket_x_coordinate=/jointset/radioulnar/pro_sup
          socket_y_coordinate=/jointset/radioulnar/pro_sup socket_z_coordinate=/jointset/radioulnar/pro_sup
        x_location: SimmSpline: x=(-1.57561 1.57823) y=(-0.0055 0.01096)
        y_location: PiecewiseLinearFunction: x=(-1.57561 0 1.57561) y=(-0.0282 -0.035 -0.0392)
        z_location: SimmSpline: x=(-1.57561 0.0866167 1.57561) y=(-0.01 -0.01358 -0.01083)
      PathPoint P8: radius (-0.002 -0.0375 -0.002)
      PathWrap: wrap_object=Elbow_BIC_BRD method=hybrid
    Millard2012EquilibriumMuscle BRA: max_isometric_force=1177.37 optimal_fiber_length=0.0858
        tendon_slack_length=0.0535 pennation_angle_at_optimal=0 max_contraction_velocity=10 default_activation=1
        minimum_activation=0
      PathPoint P1: humerus (0.0068 -0.1739 -0.0036)
      ConditionalPathPoint P2: humerus (0.01894 -0.28559 -0.01105) socket_coordinate=/jointset/elbow/elbow_flexion
          range=(0 0.813149)
      ConditionalPathPoint P3: ulna (0.00498 -0.01463 0.00128) socket_coordinate=/jointset/elbow/elbow_flexion
          range=(0 0.813149)
      PathPoint P4: ulna (-0.0032 -0.0239 0.0009)
    Millard2012EquilibriumMuscle BRD: max_isometric_force=276 optimal_fiber_length=0.1726 tendon_slack_length=0.133
        pennation_angle_at_optimal=0 max_contraction_velocity=10 default_activation=1 minimum_activation=0
      PathPoint P1: humerus (-0.0098 -0.19963 0.00223)
      PathPoint P2: radius (0.03577 -0.12742 0.02315)
      PathPoint P3: radius (0.0419 -0.221 0.0224)
      PathWrap: wrap_object=Elbow_BIC_BRD method=hybrid
    Millard2012EquilibriumMuscle ECRL: max_isometric_force=337.3 optimal_fiber_length=0.081 tendon_slack_length=0.244
        pennation_angle_at_optimal=0 max_contraction_velocity=10 fiber_damping=0.1 default_activation=1
        minimum_activation=0.01
      PathPoint P1: humerus (-0.0073 -0.2609 0.0091)
      PathPoint P2: radius (0.03195 -0.13463 0.02779)
      PathPoint P3: radius (0.04243 -0.23684 0.0362)
      PathPoint P4: capitate (0.01717 -0.02122 0.00583)
      PathWrap: wrap_object=Elbow_PT_ECRL method=hybrid
      PathWrap pathwrap_0: wrap_object=ECRL method=hybrid
    Millard2012EquilibriumMuscle ECRB: max_isometric_force=252.5 optimal_fiber_length=0.0585 tendon_slack_length=0.2223
        pennation_angle_at_optimal=0.1570796 max_contraction_velocity=10 fiber_damping=0.1 default_activation=1
        minimum_activation=0.01
      PathPoint P1: humerus (0.01349 -0.29048 0.01698)
      PathPoint P2: radius (0.02905 -0.13086 0.02385)
      PathPoint P3: radius (0.03549 -0.22805 0.03937)
      PathPoint P4: capitate (0.005 -0.01136 0.0085)
      PathWrap: wrap_object=ECRB method=hybrid
    Millard2012EquilibriumMuscle ECU: max_isometric_force=192.9 optimal_fiber_length=0.0622 tendon_slack_length=0.2285
        pennation_angle_at_optimal=0.0698132 max_contraction_velocity=10 fiber_damping=0.1 default_activation=1
        minimum_activation=0.01
      PathPoint P1: humerus (0.00083 -0.28955 0.0188)
      PathPoint P2: ulna (-0.01391 -0.03201 0.02947)
      PathPoint P3: ulna (-0.01705 -0.05428 0.02868)
      PathPoint P4: ulna (-0.01793 -0.09573 0.03278)
      PathPoint P5: radius (-0.01421 -0.22696 0.03481)
      PathPoint P6: capitate (-0.02251 -0.01401 -0.00128)
      PathWrap: wrap_object=ECU method=hybrid
    Millard2012EquilibriumMuscle FCR: max_isometric_force=407.9 optimal_fiber_length=0.0628 tendon_slack_length=0.244
        pennation_angle_at_optimal=0.0523599 max_contraction_velocity=10 fiber_damping=0.1 default_activation=1
        minimum_activation=0.01
      PathPoint P1: humerus (0.00758 -0.27806 -0.03705)
      PathPoint P2: radius (0.0211 -0.21943 0.00127)
      PathPoint P3: capitate (0.01124 -0.01844 -0.00418)
      PathWrap: wrap_object=Elbow_PT_ECRL method=hybrid
      PathWrap pathwrap_0: wrap_object=FCR method=hybrid
    Millard2012EquilibriumMuscle FCU: max_isometric_force=479.8 optimal_fiber_length=0.0509 tendon_slack_length=0.265
        pennation_angle_at_optimal=0.2094395 max_contraction_velocity=10 fiber_damping=0.1 default_activation=1
        minimum_activation=0.01
      PathPoint P1: humerus (0.00219 -0.2774 -0.0388)
      PathPoint P2: radius (0.00949 -0.1841 0.0005)
      PathPoint P3: radius (0.01082 -0.22327 0.00969)
      PathPoint P4: capitate (-0.02036 -0.01765 -0.00752)
      PathWrap: wrap_object=FCU method=hybrid
      PathWrap pathwrap_0: wrap_object=Elbow_PT_ECRL method=hybrid
    Millard2012EquilibriumMuscle PL: max_isometric_force=101 optimal_fiber_length=0.0638 tendon_slack_length=0.2694
        pennation_angle_at_optimal=0.06981317 max_contraction_velocity=10 fiber_damping=0.1 default_activation=1
        minimum_activation=0.01
      PathPoint P1: humerus (0.00457 -0.27519 -0.03865)
      PathPoint P2: radius (0.02531 -0.23915 -0.00276)
      PathPoint P3: capitate (0.00917 -0.01898 -0.01754)
      PathPoint P4: thirdmc (0.00179 0.00828 -0.00245)
      PathWrap: wrap_object=PL method=hybrid
      PathWrap pathwrap_0: wrap_object=Elbow_PT_ECRL method=hybrid
    Millard2012EquilibriumMuscle PT: max_isometric_force=557.2 optimal_fiber_length=0.0492 tendon_slack_length=0.098
        pennation_angle_at_optimal=0.1745329 max_contraction_velocity=10 default_activation=1 minimum_activation=0
      PathPoint P1: humerus (0.0036 -0.2759 -0.0365)
      PathPoint P2: ulna (0.00846 -0.03373 -0.01432)
      MovingPathPoint P3: ulna socket_x_coordinate=/jointset/radioulnar/pro_sup
          socket_y_coordinate=/jointset/radioulnar/pro_sup socket_z_coordinate=/jointset/radioulnar/pro_sup
        x_location: PiecewiseLinearFunction: x=(-1.5708 1.5708) y=(0.01884 0.00554)
        y_location: SimmSpline: x=(-1.5708 1.5708) y=(-0.06086 -0.06946)
        z_location: SimmSpline: x=(-1.5708 1.5708) y=(0.00506 -0.00944)
      ConditionalPathPoint P4: radius (0.0236 -0.0934 0.0094) socket_coordinate=/jointset/radioulnar/pro_sup
          range=(-1.5708 0.509636)
      PathPoint P5: radius (0.0254 -0.1088 0.0198)
      PathWrap: wrap_object=Elbow_PT_ECRL method=hybrid
    Millard2012EquilibriumMuscle PQ: max_isometric_force=284.7 optimal_fiber_length=0.0282 tendon_slack_length=0.005
        pennation_angle_at_optimal=0.1745329 max_contraction_velocity=10 default_activation=1 minimum_activation=0
      PathPoint P1: radius (0.03245 -0.19998 0.01962)
      PathPoint P2: ulna (0.00193 -0.20972 0.03632)
      PathWrap: wrap_object=PQ2 method=hybrid
      PathWrap pathwrap_0: wrap_object=PQ1 method=hybrid
    Millard2012EquilibriumMuscle FDSL: max_isometric_force=75.3 optimal_fiber_length=0.0515
        tendon_slack_length=0.3211348 pennation_angle_at_optimal=0.08726646 max_contraction_velocity=10
        fiber_damping=0.1 default_activation=1 minimum_activation=0.01
      PathPoint P1: humerus (0.00421 -0.27598 -0.03864)
      PathPoint P2: radius (0.01377 -0.18718 0.00205)
      PathPoint P3: capitate (-0.00235 -0.01393 -0.01376)
      PathPoint P4: fourthmc (-0.00926994 -0.017401 -0.00651486)
      PathPoint P5: fifthmc (-0.01 -0.034 0.00144159)
      PathPoint P6: 5proxph (-0.005 -0.014 -0.004)
      PathPoint P7: 5proxph (-0.0108197 -0.0242436 0)
      PathPoint P8: 5midph (-0.00419747 -0.00527177 -0.00614276)
      PathWrap: wrap_object=FDS method=hybrid
      PathWrap pathwrap_0: wrap_object=Elbow_PT_ECRL method=hybrid
      PathWrap pathwrap_1: wrap_object=_5thmcp method=hybrid range=(5 6)
    Millard2012EquilibriumMuscle FDSR: max_isometric_force=171.2 optimal_fiber_length=0.0736
        tendon_slack_length=0.313447 pennation_angle_at_optimal=0.06981317 max_contraction_velocity=10
        fiber_damping=0.1 default_activation=1 minimum_activation=0.01
      PathPoint P1: humerus (0.00479 -0.2788 -0.03731)
      PathPoint P2: radius (0.01571 -0.18666 0.00267)
      PathPoint P3: capitate (-0.00082 -0.01344 -0.01359)
      PathPoint P4: thirdmc (-0.00914 0.00544 -0.01085)
      PathPoint P5: fourthmc (-0.003 -0.039 -0.005)
      PathPoint P6: 4proxph (-0.002 -0.012 -0.006)
      PathPoint P7: 4proxph (-0.0008 -0.036 0.002)
      PathPoint P8: 4midph (-0.0009 -0.012 -0.0007)
      PathWrap: wrap_object=FDS method=hybrid
      PathWrap pathwrap_0: wrap_object=Elbow_PT_ECRL method=hybrid
      PathWrap pathwrap_1: wrap_object=_4thmcp method=hybrid range=(5 6)
    Millard2012EquilibriumMuscle FDSM: max_isometric_force=258.8 optimal_fiber_length=0.0749
        tendon_slack_length=0.2883793 pennation_angle_at_optimal=0.1221731 max_contraction_velocity=10
        fiber_damping=0.1 default_activation=1 minimum_activation=0.01
      PathPoint P1: ulna (-0.00669 -0.02713 -0.00191)
      PathPoint P2: radius (0.01899 -0.18706 0.00424)
      PathPoint P3: capitate (0.0068 -0.01377 -0.01399)
      PathPoint P4: thirdmc (0.00128 0.00639 -0.00952)
      PathPoint P5: thirdmc (0 -0.016 -0.0085)
      PathPoint P6: 3proxph (0.001 -0.011 -0.009)
      PathPoint P7: 3proxph (0.003 -0.037 -0.002)
      PathPoint P8: 3midph (0.00023 -0.01075 -0.00541)
      PathWrap: wrap_object=FDS method=hybrid
      PathWrap pathwrap_0: wrap_object=_3rdmcp method=hybrid range=(5 6)
    Millard2012EquilibriumMuscle FDSI: max_isometric_force=162.5 optimal_fiber_length=0.0835
        tendon_slack_length=0.2771446 pennation_angle_at_optimal=0.1047198 max_contraction_velocity=10
        fiber_damping=0.1 default_activation=1 minimum_activation=0.01
      PathPoint P1: ulna (-0.00676 -0.02819 -0.00137)
      PathPoint P2: radius (0.02145 -0.18623 0.006)
      PathPoint P3: capitate (0.00889 -0.01366 -0.01387)
      PathPoint P4: secondmc (-0.00407 -0.00025 -0.00479)
      PathPoint P5: secondmc (-0.001 -0.021 -0.00579)
      PathPoint P6: 2proxph (-0.001 -0.014 -0.002705)
      PathPoint P6_0: 2proxph (0.00427 -0.035 0.004)
      PathPoint P7: 2midph (0.00228 -0.008 -0.005)
      PathWrap: wrap_object=FDS method=hybrid
      PathWrap pathwrap_0: wrap_object=2ndmcp_FDSI method=hybrid range=(5 7)
      PathWrap pathwrap_1: wrap_object=2ndpm_FDSI method=axial range=(7 8)
    Millard2012EquilibriumMuscle FDPL: max_isometric_force=236.8 optimal_fiber_length=0.0749
        tendon_slack_length=0.2932528 pennation_angle_at_optimal=0.1396263 max_contraction_velocity=10
        fiber_damping=0.1 default_activation=1 minimum_activation=0.01
      PathPoint P1: ulna (-0.00628 -0.03214 0.00254)
      PathPoint P2: radius (0.01409 -0.18516 0.00861)
      PathPoint P3: capitate (-0.00088 -0.01027 -0.01188)
      PathPoint P4: fourthmc (-0.0107079 -0.0165164 0.000412855)
      PathPoint P5: fifthmc (-0.011 -0.036 0.004)
      PathPoint P6: 5proxph (-0.004 -0.01 -0.004)
      PathPoint P7: 5proxph (-0.0118783 -0.028 -0.003)
      PathPoint P8: 5midph (-0.00611082 -0.00773222 -0.0056409)
      PathPoint P9: 5midph (-0.00703421 -0.0151198 -0.00172322)
      PathPoint P10: 5distph (-0.00520646 -0.0107957 -0.00278697)
      PathWrap: wrap_object=FDP method=hybrid
      PathWrap pathwrap_0: wrap_object=5thmcp method=hybrid range=(5 6)
    Millard2012EquilibriumMuscle FDPR: max_isometric_force=172.9 optimal_fiber_length=0.0798
        tendon_slack_length=0.2922496 pennation_angle_at_optimal=0.1221731 max_contraction_velocity=10
        fiber_damping=0.1 default_activation=1 minimum_activation=0.01
      PathPoint P1: ulna (-0.00502 -0.03374 0.00273)
      PathPoint P2: radius (0.0158 -0.18629 0.00803)
      PathPoint P3: capitate (0.00106 -0.01177 -0.01184)
      PathPoint P4: thirdmc (-0.0104 0.00473 -0.00804)
      PathPoint P5: fourthmc (-0.003 -0.039 -0.001)
      PathPoint P6: 4proxph (-0.003 -0.011 -0.009)
      PathPoint P7: 4proxph (-0.005 -0.033 0.002)
      PathPoint P8: 4midph (-0.000219705 -0.00758918 -0.00586796)
      PathPoint P9: 4midph (-0.0016473 -0.0196795 0.000547576)
      PathPoint P10: 4distph (-0.00091307 -0.003901 -0.00311151)
      PathWrap: wrap_object=FDP method=hybrid
      PathWrap pathwrap_0: wrap_object=_4thmcp method=hybrid range=(5 6)
    Millard2012EquilibriumMuscle FDPM: max_isometric_force=212.4 optimal_fiber_length=0.0835
        tendon_slack_length=0.295226 pennation_angle_at_optimal=0.1047198 max_contraction_velocity=10 fiber_damping=0.1
        default_activation=1 minimum_activation=0.01
      PathPoint P1: ulna (-0.00522 -0.03327 0.0021)
      PathPoint P2: radius (0.01906 -0.18644 0.00785)
      PathPoint P3: capitate (0.00335 -0.0128 -0.01144)
      PathPoint P4: thirdmc (-0.00128 0.00609 -0.00838)
      PathPoint P5: thirdmc (0.0005 -0.0186823 -0.00767178)
      PathPoint P6: 3proxph (0.0005 -0.016 -0.00564398)
      PathPoint P7: 3proxph (0.00238 -0.03643 -0.001)
      PathPoint P8: 3midph (0.00158 -0.01149 -0.00512)
      PathPoint P9: 3midph (0.00213 -0.02144 -0.00213)
      PathPoint P10: 3distph (6e-5 -0.00501 -0.00419)
      PathWrap: wrap_object=FDP method=hybrid
      PathWrap pathwrap_0: wrap_object=_3rdmcp method=hybrid range=(5 6)
    Millard2012EquilibriumMuscle FDPI: max_isometric_force=197.3 optimal_fiber_length=0.0749
        tendon_slack_length=0.3062338 pennation_angle_at_optimal=0.1221731 max_contraction_velocity=10
        fiber_damping=0.1 default_activation=1 minimum_activation=0.01
      PathPoint P1: ulna (-0.00647 -0.03176 0.0028)
      PathPoint P2: radius (0.0208 -0.1856 0.00915)
      PathPoint P3: capitate (0.00896 -0.01168 -0.01212)
      PathPoint P4: secondmc (-0.00432 0.007 -0.00248)
      PathPoint P5: secondmc (0 -0.021 -0.005)
      PathPoint P6: 2proxph (0 -0.011 -0.002775)
      PathPoint P6_0: 2proxph (0.00581 -0.034 0.00306)
      PathPoint P7: 2midph (0.002 -0.021 -0.002)
      PathPoint P8: 2distph (0.00046 -0.0046 -0.003)
      PathWrap: wrap_object=FDP method=hybrid
      PathWrap pathwrap_0: wrap_object=2ndmcp_FDPI method=hybrid
      PathWrap pathwrap_1: wrap_object=2ndpm_FDPI method=hybrid
    Millard2012EquilibriumMuscle EDCL: max_isometric_force=39.4 optimal_fiber_length=0.065
        tendon_slack_length=0.3297528 pennation_angle_at_optimal=0.03490659 max_contraction_velocity=10
        fiber_damping=0.1 default_activation=1 minimum_activation=0.01
      PathPoint P1: humerus (-0.0004 -0.28831 0.0187)
      PathPoint P2: radius (0.0013 -0.03888 0.01405)
      PathPoint P3: radius (0.00993 -0.22304 0.03618)
      PathPoint P4: fifthmc (-0.0098 -0.0393 0.0157)
      PathPoint P5: 5proxph (-0.00138649 -0.006 0.00864125)
      PathPoint P6: 5proxph (-0.0104924 -0.03 0.0098668)
      PathPoint P7: 5midph (-0.000199375 -0.00703822 0.00578716)
      PathPoint P8: 5midph (-0.00323208 -0.0190612 0.005)
      PathPoint P9: 5distph (-0.000565387 -0.0137207 0.003)
      PathWrap: wrap_object=EDCL method=hybrid range=(3 4)
      PathWrap pathwrap_0: wrap_object=_5thmcp method=hybrid range=(4 5)
      PathWrap pathwrap_1: wrap_object=Fifthpm method=hybrid range=(6 7)
      PathWrap pathwrap_2: wrap_object=Fifthmd method=hybrid range=(8 9)
    Millard2012EquilibriumMuscle EDCR: max_isometric_force=109.2 optimal_fiber_length=0.0626
        tendon_slack_length=0.3414376 pennation_angle_at_optimal=0.05235988 max_contraction_velocity=10
        fiber_damping=0.1 default_activation=1 minimum_activation=0.01
      PathPoint P1: humerus (-0.00156 -0.28936 0.01782)
      PathPoint P2: radius (0.0026 -0.03991 0.01552)
      PathPoint P3: radius (0.00882 -0.22366 0.043)
      PathPoint P4: fourthmc (-0.004 -0.049 0.013)
      PathPoint P5: 4proxph (0.001 -0.007 0.009)
      PathPoint P6: 4proxph (-0.003 -0.037 0.009)
      PathPoint P7: 4midph (0.00126345 -0.005 0.007)
      PathPoint P8: 4midph (-0.000192701 -0.023 0.007)
      PathPoint P9: 4distph (0.00153887 -0.004 0.005)
      PathWrap: wrap_object=EDCR method=hybrid range=(3 4)
      PathWrap pathwrap_0: wrap_object=_4thmcp method=hybrid range=(4 5)
      PathWrap pathwrap_1: wrap_object=Fourthpm method=hybrid range=(6 7)
      PathWrap pathwrap_2: wrap_object=Fourthmd method=hybrid range=(8 9)
    Millard2012EquilibriumMuscle EDCM: max_isometric_force=94.4 optimal_fiber_length=0.0724
        tendon_slack_length=0.342363 pennation_angle_at_optimal=0.05235988 max_contraction_velocity=10
        fiber_damping=0.1 default_activation=1 minimum_activation=0.01
      PathPoint P1: humerus (0.00051 -0.28984 0.01949)
      PathPoint P2: radius (0.00316 -0.03948 0.01528)
      PathPoint P3: radius (0.0144 -0.22323 0.04223)
      PathPoint P4: thirdmc (-0.00069 -0.027 0.01)
      PathPoint P5: 3proxph (-0.00118 -0.012 0.01074)
      PathPoint P6: 3proxph (0.00169 -0.04139 0.01127)
      PathPoint P7: 3midph (0.00039 -0.00423 0.00625)
      PathPoint P8: 3midph (0.000948021 -0.0287498 0.0054336)
      PathPoint P9: 3distph (-0.00058 -0.00694 0.00308)
      PathWrap: wrap_object=EDCM method=hybrid range=(3 4)
      PathWrap pathwrap_0: wrap_object=_3rdmcp method=hybrid range=(4 5)
      PathWrap pathwrap_1: wrap_object=Thirdpm method=hybrid range=(6 7)
      PathWrap pathwrap_2: wrap_object=Thirdmd method=hybrid range=(8 9)
    Millard2012EquilibriumMuscle EDCI: max_isometric_force=48.8 optimal_fiber_length=0.07 tendon_slack_length=0.3485834
        pennation_angle_at_optimal=0.05235988 max_contraction_velocity=10 fiber_damping=0.1 default_activation=1
        minimum_activation=0.01
      PathPoint P1: humerus (0.00065 -0.28898 0.01869)
      PathPoint P2: radius (0.00228 -0.03918 0.01483)
      PathPoint P3: radius (0.01533 -0.22314 0.04196)
      PathPoint P4: secondmc (0.00586478 -0.0255916 0.0133706)
      PathPoint P5: 2proxph (0.00308218 -0.00969151 0.0110479)
      PathPoint P6: 2proxph (0.00771 -0.038 0.013)
      PathPoint P7: 2midph (0.00123 -0.005 0.005)
      PathPoint P8: 2midph (0.0026 -0.018 0.006)
      PathPoint P9: 2distph (0.00025 -0.0037 0.00228)
      PathWrap: wrap_object=EDCI method=hybrid range=(3 4)
      PathWrap pathwrap_0: wrap_object=2ndmcp_extI range=(4 5)
      PathWrap pathwrap_1: wrap_object=2ndpm_extI range=(6 7)
      PathWrap pathwrap_2: wrap_object=2ndmd_extI range=(8 9)
    Millard2012EquilibriumMuscle EDM: max_isometric_force=72.4 optimal_fiber_length=0.0675
        tendon_slack_length=0.3307565 pennation_angle_at_optimal=0.05235988 max_contraction_velocity=10
        fiber_damping=0.1 default_activation=1 minimum_activation=0.01
      PathPoint P1: humerus (0.00089 -0.28919 0.01847)
      PathPoint P2: ulna (-0.00977 -0.03907 0.03085)
      PathPoint P3: ulna (-0.00755 -0.08267 0.03646)
      PathPoint P4: radius (0.00454 -0.22641 0.03678)
      PathPoint P5: fifthmc (0.00197929 0.00246388 0.00775836)
      PathPoint P6: fifthmc (-0.0110416 -0.038531 0.0150118)
      PathPoint P7: 5proxph (-0.00138649 -0.006 0.00864125)
      PathPoint P8: 5proxph (-0.0104924 -0.0300219 0.0098668)
      PathPoint P9: 5midph (-0.000199375 -0.00703822 0.00578716)
      PathPoint P10: 5midph (-0.00323208 -0.02 0.005)
      PathPoint P11: 5distph (-0.000565387 -0.014 0.004)
      PathWrap: wrap_object=EDM method=hybrid range=(4 5)
      PathWrap pathwrap_0: wrap_object=_5thmcp method=hybrid range=(6 7)
      PathWrap pathwrap_1: wrap_object=Fifthpm method=hybrid range=(8 9)
      PathWrap pathwrap_2: wrap_object=Fifthmd method=hybrid range=(10 11)
    Millard2012EquilibriumMuscle EIP: max_isometric_force=47.3 optimal_fiber_length=0.0589 tendon_slack_length=0.1911
        pennation_angle_at_optimal=0.1047198 max_contraction_velocity=10 fiber_damping=0.1 default_activation=1
        minimum_activation=0.01
      PathPoint P1: ulna (-0.00394 -0.16652 0.03682)
      PathPoint P2: ulna (0.00171 -0.17469 0.04049)
      PathPoint P3: radius (0.01076 -0.22783 0.037)
      PathPoint P4: secondmc (-0.01081 0.015 0.007)
      PathPoint P5: secondmc (0.00441 -0.027 0.013)
      PathPoint P6: 2proxph (0.00171 -0.01 0.011)
      PathPoint P7: 2proxph (0.00714 -0.038 0.013)
      PathPoint P8: 2midph (0.00115 -0.005 0.005)
      PathPoint P9: 2midph (0.00294 -0.018 0.006)
      PathPoint P10: 2distph (0 -0.004 0.002)
      PathWrap: wrap_object=EIP method=hybrid
      PathWrap pathwrap_0: wrap_object=2ndmcp_extI method=hybrid range=(5 6)
      PathWrap pathwrap_1: wrap_object=2ndpm_extI method=hybrid range=(7 8)
      PathWrap pathwrap_2: wrap_object=2ndmd_extI method=hybrid range=(9 10)
    Millard2012EquilibriumMuscle EPL: max_isometric_force=88.3 optimal_fiber_length=0.054 tendon_slack_length=0.2305
        pennation_angle_at_optimal=0.1047198 max_contraction_velocity=10 fiber_damping=0.1 default_activation=1
        minimum_activation=0.01
      PathPoint P1: ulna (-0.01412 -0.09706 0.02952)
      PathPoint P2: radius (0.00124 -0.13668 0.0227)
      PathPoint P3: radius (0.02702 -0.21872 0.03828)
      PathPoint P4: radius (0.03382 -0.22754 0.04607)
      PathPoint P5: radius (0.04234 -0.23771 0.04173)
      PathPoint P6: capitate (0.02428 0.00014 0.00608)
      PathPoint P7: trapezium (0.00809 -0.0046 0.00992)
      PathPoint P8: firstmc (0.00656 -0.0043 0.00792)
      PathPoint P9: firstmc (0.02165 -0.0242 -0.00533)
      PathPoint P10: proximal_thumb (0.01147 -0.00362 0.00156)
      PathPoint P11: proximal_thumb (0.01921 -0.0265 -0.01038)
      PathPoint P12: distal_thumb (0.00543 -0.00714 -0.00464)
      PathWrap: wrap_object=MPthumb method=hybrid
    Millard2012EquilibriumMuscle EPB: max_isometric_force=46 optimal_fiber_length=0.0675 tendon_slack_length=0.1155
        pennation_angle_at_optimal=0.122173 max_contraction_velocity=10 fiber_damping=0.1 default_activation=1
        minimum_activation=0.01
      PathPoint P1: radius (0.01924 -0.14695 0.02114)
      PathPoint P2: radius (0.02276 -0.15857 0.02665)
      PathPoint P3: radius (0.03831 -0.19722 0.03834)
      PathPoint P4: radius (0.05235 -0.23611 0.02699)
      PathPoint P5: capitate (0.03123 0.00256 -0.00327)
      PathPoint P6: firstmc1 (0.01443 -0.00337 -0.00405)
      PathPoint P7: firstmc (0.02173 -0.02303 -0.01141)
      PathPoint P8: proximal_thumb (0.00927 -0.00618 -0.00557)
      PathWrap: wrap_object=MPthumb method=hybrid
    Millard2012EquilibriumMuscle FPL: max_isometric_force=201 optimal_fiber_length=0.0552 tendon_slack_length=0.197
        pennation_angle_at_optimal=0.1221731 max_contraction_velocity=10 fiber_damping=0.1 default_activation=1
        minimum_activation=0.01
      PathPoint P1: radius (0.00971 -0.09458 0.01769)
      PathPoint P2: radius (0.01658 -0.13525 0.01915)
      PathPoint P3: radius (0.01869 -0.17932 0.01988)
      PathPoint P4: radius (0.038 -0.23171 0.0158)
      MovingPathPoint P5: capitate socket_x_coordinate=/jointset/radiocarpal/flexion
          socket_y_coordinate=/jointset/radiocarpal/flexion socket_z_coordinate=/jointset/radiocarpal/flexion
        x_location: SimmSpline: x=(-1.22173 0 1.22173) y=(0.01869 0.01869 0.01229)
        y_location: SimmSpline: x=(-1.22173 0 1.22173) y=(0.00882 0.00882 -0.01038)
        z_location: SimmSpline: x=(-1.22173 0 1.22173) y=(-0.01547 -0.01547 -0.02627)
      PathPoint P6: capitate (0.01244 -0.02207 -0.02089)
      PathPoint P7: firstmc (-0.00608 -0.01624 -0.0094)
      PathPoint P8: firstmc (0.00208 -0.02297 -0.00956)
      PathPoint P9: proximal_thumb (-0.0045 -0.01842 -0.00508)
      PathPoint P10: proximal_thumb (0.0059 -0.02602 -0.01114)
      PathPoint P11: distal_thumb (0.00242 -0.01127 -0.00412)
      PathWrap: wrap_object=FPL method=hybrid range=(1 6)
      PathWrap pathwrap_0: wrap_object=MPthumb method=hybrid
      PathWrap pathwrap_1: wrap_object=IPthumb method=hybrid range=(10 11)
    Millard2012EquilibriumMuscle APL: max_isometric_force=116.7 optimal_fiber_length=0.0713 tendon_slack_length=0.1295
        pennation_angle_at_optimal=0.1396263 max_contraction_velocity=10 fiber_damping=0.1 default_activation=1
        minimum_activation=0.01
      PathPoint P1: radius (0.01154 -0.09477 0.01681)
      PathPoint P2: radius (0.0303 -0.1397 0.03507)
      PathPoint P3: radius (0.03993 -0.16072 0.034)
      PathPoint P4: radius (0.04397 -0.17845 0.03134)
      PathPoint P5: radius (0.05505 -0.23084 0.02368)
      MovingPathPoint P6: capitate socket_x_coordinate=/jointset/radiocarpal/flexion
          socket_y_coordinate=/jointset/radiocarpal/flexion socket_z_coordinate=/jointset/radiocarpal/flexion
        x_location: SimmSpline: x=(-1.22173 0 1.22173) y=(0.03385 0.0336 0.0276)
        y_location: SimmSpline: x=(-1.22173 0 1.22173) y=(0.00634 0.00624 0.00384)
        z_location: SimmSpline: x=(-1.22173 0 1.22173) y=(-0.00745 -0.00795 -0.01995)
      PathPoint P7: firstmc1 (0.01058 0.00662 -0.00619)
      PathPoint P8: firstmc (0.00629 0.00323 -0.00589)
      PathPoint P9: firstmc (0.00827 -0.00586 -0.00604)
    Millard2012EquilibriumMuscle APB: min_control=0.01 max_isometric_force=34.54 optimal_fiber_length=0.0511
        tendon_slack_length=0.02436921 pennation_angle_at_optimal=0.08028515 max_contraction_velocity=10
        fiber_damping=0.1 default_fiber_length=0.1 minimum_activation=0.01
      PathPoint P1: capitate (0.012493 -0.005469 -0.016108)
      PathPoint P1_0: trapezium (0.00806407 -0.000600866 -0.00780272)
      PathPoint P4: proximal_thumb (0.00770617 -0.0047171 -0.009)
      PathPoint P5: proximal_thumb (0.0148 -0.02 -0.011)
      ActiveForceLengthCurve: min_norm_active_fiber_length=0.4441 transition_norm_fiber_length=0.73
          max_norm_active_fiber_length=1.8123 shallow_ascending_slope=0.8616 minimum_value=0
      FiberForceLengthCurve: strain_at_zero_force=0 strain_at_one_norm_force=0.7
      TendonForceLengthCurve: strain_at_one_norm_force=0.049
    Millard2012EquilibriumMuscle FPB: min_control=0.01 max_isometric_force=33.53 optimal_fiber_length=0.0509
        tendon_slack_length=0.006795853 pennation_angle_at_optimal=0.1082104 max_contraction_velocity=10
        fiber_damping=0.1 default_fiber_length=0.1 minimum_activation=0.01
      PathPoint FPB_opt-P1: capitate (0.00959 -0.00667 -0.01481)
      PathPoint FPB_opt-P2: trapezium (0.0015 -0.0124979 -0.00496)
      PathPoint FPB_opt-P3: proximal_thumb (-0.00565728 -0.00240197 0.00084)
      PathPoint FPB_opt-P4: proximal_thumb (0.002 -0.013 -0.004)
      ActiveForceLengthCurve: min_norm_active_fiber_length=0.4441 transition_norm_fiber_length=0.73
          max_norm_active_fiber_length=1.8123 shallow_ascending_slope=0.8616 minimum_value=0
      FiberForceLengthCurve: strain_at_zero_force=0 strain_at_one_norm_force=0.7
      TendonForceLengthCurve: strain_at_one_norm_force=0.049
    Millard2012EquilibriumMuscle OPP: min_control=0.01 max_isometric_force=51.82 optimal_fiber_length=0.0436
        tendon_slack_length=0.002540121 pennation_angle_at_optimal=0.08552113 max_contraction_velocity=10
        fiber_damping=0.1 default_fiber_length=0.1 minimum_activation=0.01
      PathPoint P1: capitate (0.01129 -0.00147 -0.01731)
      PathPoint P2: firstmc (-0.00238629 -0.00894 -0.00551728)
      PathPoint P3: firstmc (0.012 -0.028 -0.017)
      ActiveForceLengthCurve: min_norm_active_fiber_length=0.4441 transition_norm_fiber_length=0.73
          max_norm_active_fiber_length=1.8123 shallow_ascending_slope=0.8616 minimum_value=0
      FiberForceLengthCurve: strain_at_zero_force=0 strain_at_one_norm_force=0.7
      TendonForceLengthCurve: strain_at_one_norm_force=0.049
    Millard2012EquilibriumMuscle ADPt: min_control=0.01 max_isometric_force=59.944 optimal_fiber_length=0.0417
        tendon_slack_length=0.02311892 pennation_angle_at_optimal=0.301942 max_contraction_velocity=10
        fiber_damping=0.1 default_fiber_length=0.1 minimum_activation=0.01
      PathPoint ADPt_opt-P1: capitate (0.00064 -0.02422 0.00149)
      PathPoint ADPt_opt-P2: trapezium (0.0082177 -0.0246635 -0.00488374)
      PathPoint ADPt_opt-P3: proximal_thumb (-0.00730309 -0.00505412 -0.00146726)
      PathPoint ADPt_opt-P4: proximal_thumb (0.0056 -0.0095 0.0023)
      ActiveForceLengthCurve: min_norm_active_fiber_length=0.4441 transition_norm_fiber_length=0.73
          max_norm_active_fiber_length=1.8123 shallow_ascending_slope=0.8616 minimum_value=0
      FiberForceLengthCurve: strain_at_zero_force=0 strain_at_one_norm_force=0.7
      TendonForceLengthCurve: strain_at_one_norm_force=0.049
    Millard2012EquilibriumMuscle ADPo: min_control=0.01 max_isometric_force=102.108 optimal_fiber_length=0.03477273
        tendon_slack_length=0.0378533 pennation_angle_at_optimal=0.301942 max_contraction_velocity=10 fiber_damping=0.1
        default_fiber_length=0.1 minimum_activation=0.01
      PathPoint ADPo_opt-P1: capitate (-0.00131 -0.00527 -0.00665)
      PathPoint ADPo_opt-P2: trapezium (0.00741594 -0.0214963 -0.00466016)
      PathPoint ADPo_opt-P3: proximal_thumb (-0.00698466 -0.00535159 -0.000499131)
      PathPoint ADPo_opt-P4: proximal_thumb (0.0051 -0.01352 -0.00715)
      ActiveForceLengthCurve: min_norm_active_fiber_length=0.4441 transition_norm_fiber_length=0.73
          max_norm_active_fiber_length=1.8123 shallow_ascending_slope=0.8616 minimum_value=0
      FiberForceLengthCurve: strain_at_zero_force=0 strain_at_one_norm_force=0.7
      TendonForceLengthCurve: strain_at_one_norm_force=0.049
    Millard2012EquilibriumMuscle ADM: max_isometric_force=45.2 optimal_fiber_length=0.0567
        tendon_slack_length=0.008617426 pennation_angle_at_optimal=0.06806784 max_contraction_velocity=10
        fiber_damping=0.1 default_activation=1 minimum_activation=0.01
      PathPoint P1: fifthmc (0.001 0.006 -0.008)
      PathPoint P2: fifthmc (-0.0115 -0.036 0.003)
      PathPoint P3: 5proxph (-0.0115 -0.01 -0.002)
      PathWrap: wrap_object=_5thmcp method=hybrid
    Millard2012EquilibriumMuscle FDM: max_isometric_force=27.4 optimal_fiber_length=0.04982727
        tendon_slack_length=0.006377202 pennation_angle_at_optimal=0.06283185 max_contraction_velocity=10
        fiber_damping=0.1 default_activation=1 minimum_activation=0.01
      PathPoint P1: fifthmc (-0.0025634 -0.00199908 -0.00487276)
      PathPoint P2: fifthmc (-0.0115 -0.036 0.003)
      PathPoint P3: 5proxph (-0.0115 -0.01 -0.002)
      PathWrap: wrap_object=_5thmcp method=hybrid
    Millard2012EquilibriumMuscle 1stPI: max_isometric_force=38.1 optimal_fiber_length=0.03068182
        tendon_slack_length=0.01988032 pennation_angle_at_optimal=0.1099557 max_contraction_velocity=10
        fiber_damping=0.1 default_activation=1 minimum_activation=0.01
      PathPoint P1: secondmc (-0.006 0.011 -0.003)
      PathPoint P2: secondmc (-0.003 -0.025 0.003)
      PathPoint P3: 2proxph (-0.005 -0.011 0.001)
    Millard2012EquilibriumMuscle 2ndPI: max_isometric_force=33 optimal_fiber_length=0.03190909
        tendon_slack_length=0.0185252 pennation_angle_at_optimal=0.1343904 max_contraction_velocity=10
        fiber_damping=0.1 default_activation=1 minimum_activation=0.01
      PathPoint P1: thirdmc (-0.006 0.016 -0.003)
      PathPoint P2: fourthmc (0.001 -0.047 0.0025)
      PathPoint P3: 4proxph (0.006 -0.01 -0.002)
    Millard2012EquilibriumMuscle 3rdPI: max_isometric_force=31 optimal_fiber_length=0.02896364
        tendon_slack_length=0.01710424 pennation_angle_at_optimal=0.143117 max_contraction_velocity=10
        fiber_damping=0.1 default_activation=1 minimum_activation=0.01
      PathPoint P1: fifthmc (0 -0.012 0.003)
      PathPoint P2: fifthmc (-0.0045 -0.0425 0.007)
      PathPoint P3: 5proxph (0.003 -0.015 -0.002)
    Millard2012EquilibriumMuscle 1stDI_MC1: max_isometric_force=60.7 optimal_fiber_length=0.02237011
        tendon_slack_length=0.0417197 pennation_angle_at_optimal=0.1605703 max_contraction_velocity=10
        fiber_damping=0.1 default_activation=1 minimum_activation=0.01
      PathPoint P1: firstmc (0.00443429 -0.00969982 0.003216)
      PathPoint P2: secondmc (0.009 -0.0266 0)
      PathPoint P3: 2proxph (0.009 -0.016 -0.001)
    Millard2012EquilibriumMuscle 1stDI_MC2: max_isometric_force=15.51 optimal_fiber_length=0.03890454
        tendon_slack_length=0.02244353 pennation_angle_at_optimal=0.1605703 max_contraction_velocity=10
        fiber_damping=0.1 default_activation=1 minimum_activation=0.01
      PathPoint P1: secondmc (0.003 0.016 -0.003)
      PathPoint P2: secondmc (0.00825 -0.025 -0.002)
      PathPoint P3: 2proxph (0.009 -0.016 -0.001)
    Millard2012EquilibriumMuscle 2ndDI: max_isometric_force=68.1 optimal_fiber_length=0.03080454
        tendon_slack_length=0.02351616 pennation_angle_at_optimal=0.143117 max_contraction_velocity=10
        fiber_damping=0.1 default_activation=1 minimum_activation=0.01
      PathPoint P1: thirdmc (0.003 0.016 -0.003)
      PathPoint P2: thirdmc (0.007 -0.021 0.001)
      PathPoint P3: 3proxph (0.008 -0.012 0)
    Millard2012EquilibriumMuscle 3rdDI: max_isometric_force=48.3 optimal_fiber_length=0.03166364
        tendon_slack_length=0.02463824 pennation_angle_at_optimal=0.1710423 max_contraction_velocity=10
        fiber_damping=0.1 default_activation=1 minimum_activation=0.01
      PathPoint P1: thirdmc (-0.004 0.016 -0.003)
      PathPoint P2: thirdmc (-0.006 -0.024 0.0005)
      PathPoint P3: 3proxph (-0.006 -0.014 0.001)
      PathWrap: wrap_object=_3rdmcp method=hybrid
    Millard2012EquilibriumMuscle 4thDI: max_isometric_force=46.23 optimal_fiber_length=0.03166364
        tendon_slack_length=0.02400178 pennation_angle_at_optimal=0.164061 max_contraction_velocity=10
        fiber_damping=0.1 default_activation=1 minimum_activation=0.01
      PathPoint P1: fourthmc (-0.005 -0.007 -0.003)
      PathPoint P2: fourthmc (-0.01 -0.042 0.007)
      PathPoint P3: 4proxph (-0.008 -0.012 -0.002)
    Millard2012EquilibriumMuscle LUML: max_isometric_force=3.05 optimal_fiber_length=0.06148636
        tendon_slack_length=0.000444845 pennation_angle_at_optimal=0.0122173 max_contraction_velocity=10
        ignore_tendon_compliance=true fiber_damping=0.1 default_activation=1 minimum_activation=0.01
      PathPoint P1: fourthmc (-0.00263187 -0.0078013 -0.00517657)
      PathPoint P2: fifthmc (-0.005 -0.038 0.001)
      PathPoint P3: 5proxph (-0.0015 -0.019 -0.003)
      PathPoint P4: 5proxph (-0.00302 -0.022 0.004)
      PathWrap: wrap_object=_5thmcp method=hybrid
    Millard2012EquilibriumMuscle LUMR: max_isometric_force=4.06 optimal_fiber_length=0.06897273
        tendon_slack_length=0.000740062 pennation_angle_at_optimal=0.01919862 max_contraction_velocity=10
        ignore_tendon_compliance=true fiber_damping=0.1 default_activation=1 minimum_activation=0.01
      PathPoint P1: thirdmc (-0.00314923 0.0200016 -0.0166407)
      PathPoint P2: fourthmc (0 -0.039 -0.001)
      PathPoint P3: 4proxph (0.003 -0.012 -0.007)
      PathPoint P4: 4proxph (0.003 -0.017 0.003)
      PathWrap: wrap_object=_4thmcp
    Millard2012EquilibriumMuscle LUMM: max_isometric_force=4.06 optimal_fiber_length=0.06811364
        tendon_slack_length=0.00253032 pennation_angle_at_optimal=0.02792527 max_contraction_velocity=10
        ignore_tendon_compliance=true fiber_damping=0.1 default_activation=1 minimum_activation=0.01
      PathPoint P1: thirdmc (0.002 0.022 -0.016)
      PathPoint P2: thirdmc (0.006 -0.02 -0.01)
      PathPoint P3: 3proxph (0.009 -0.016 0.005)
    Millard2012EquilibriumMuscle LUMI: max_isometric_force=5.59 optimal_fiber_length=0.06799091
        tendon_slack_length=0.001182965 pennation_angle_at_optimal=0.02094395 max_contraction_velocity=10
        ignore_tendon_compliance=true fiber_damping=0.1 default_activation=1 minimum_activation=0.01
      PathPoint P1: secondmc (-0.0055 0.022 -0.014)
      PathPoint P2: secondmc (0.005 -0.0225 -0.006)
      PathPoint P3: 2proxph (0.005 -0.01 -0.005)
      PathPoint P4: 2proxph (0.005 -0.016 -0.005)
      PathWrap: wrap_object=2ndmcp_extI method=hybrid
    FunctionBasedBushingForce [values shared by the 16 below unless stated]: translational_damping=(0 0 0)
        moment_visual_scale=0.005 force_visual_scale=0.005 visual_aspect_ratio=5 m_y_theta_y_function=Constant(value=0)
        m_z_theta_z_function=Constant(value=0) f_x_delta_x_function=Constant(value=0)
        f_y_delta_y_function=Constant(value=0) f_z_delta_z_function=Constant(value=0)
    FunctionBasedBushingForce cmc_flexion_passive_torque: socket_frame1=capitate_offset socket_frame2=firstmc1_offset
        rotational_damping=(0.0142 0 0)
      PhysicalOffsetFrame capitate_offset: socket_parent=/bodyset/capitate translation=(0.015293 -0.004569 -0.010308)
          orientation=(-0.7805 0.9677 1.496) [radians]
      PhysicalOffsetFrame firstmc1_offset: socket_parent=/bodyset/firstmc1 translation=(0 0 0)
          orientation=(-0.7805 0.9677 1.496)
      m_x_theta_x_function: SimmSpline: x=(-0.785398 -0.744674 -0.703949 -0.663225 -0.622501 -0.581776 -0.541052 -0.500328 -0.459603 -0.418879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)
          y=(-2.11246 -1.56572 -1.12697 -0.813336 -0.583454 -0.422181 -0.311359 -0.232826 -0.171442 -0.12721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)
    FunctionBasedBushingForce cmc_abduction_passive_torque: socket_frame1=firstmc1_offset socket_frame2=firstmc_offset
        rotational_damping=(0.0142 0 0)
      PhysicalOffsetFrame firstmc1_offset: socket_parent=/bodyset/firstmc1 translation=(0.0072 -0.0054 -0.0025)
          orientation=(0.19 -0.5753 0.939)
      PhysicalOffsetFrame firstmc_offset: socket_parent=/bodyset/firstmc translation=(0 0 0)
          orientation=(0.19 -0.5753 0.939)
      m_x_theta_x_function: SimmSpline: x=(-0.436332 -0.409888 -0.383444 -0.356999 -0.330555 -0.30411 -0.277666 -0.251222 -0.224777 -0.198333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)
          y=(-0.988633 -0.896213 -0.791667 -0.682573 -0.605303 -0.527273 -0.443939 -0.345455 -0.299243 -0.220455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)
    FunctionBasedBushingForce mcp_flexion_passive_torque: socket_frame1=firstmc_offset
        socket_frame2=proximal_thumb_offset rotational_damping=(0.0142 0 0)
      PhysicalOffsetFrame firstmc_offset: socket_parent=/bodyset/firstmc translation=(0.0165 -0.0292 -0.0127)
          orientation=(-4.4639 2.6726 4.6178)
      PhysicalOffsetFrame proximal_thumb_offset: socket_parent=/bodyset/proximal_thumb translation=(0 0 0)
          orientation=(-4.4639 2.6726 4.6178)
      m_x_theta_x_function: SimmSpline: x=(-0.698132 -0.645148 -0.592165 -0.539182 -0.486199 -0.433216 -0.380232 -0.327249 -0.274266 -0.221283 -0.1683 -0.115316 -0.0623332 -0.00934998 0.0436332 0.0966164 0.1496 0.202583 0.255566 0.308549 0.361532 0.414516 0.467499 0.520482 0.573465 0.626449 0.679432 0.732415 0.785398)
          y=(-0.125354 -0.0897995 -0.0644929 -0.0464804 -0.0336594 -0.0245336 -0.0180378 -0.0134138 -0.0101216 -0.00777699 -0.00610597 -0.00491312 -0.00405861 -0.00344171 -0.00298887 -0.00264477 -0.00236534 -0.00211178 -0.00184472 -0.00151746 -0.00106725 -0.000402609 0.000615687 0.00220416 0.00470291 0.00864866 0.0148902 0.0247709 0.0404181)
    FunctionBasedBushingForce ip_flexion_passive_torque: socket_frame1=proximal_thumb_offset
        socket_frame2=distal_thumb_offset rotational_damping=(0.0105 0 0)
      PhysicalOffsetFrame proximal_thumb_offset: socket_parent=/bodyset/proximal_thumb
          translation=(0.014 -0.0259 -0.0101) orientation=(-0.9482 1.1788 1.4393)
      PhysicalOffsetFrame distal_thumb_offset: socket_parent=/bodyset/distal_thumb translation=(0 0 0)
          orientation=(-0.9482 1.1788 1.4393)
      m_x_theta_x_function: SimmSpline: x=(-0.4363 -0.374 -0.3117 -0.2493 -0.187 -0.1247 -0.0623 0 0.0623 0.1247 0.187 0.2493 0.3117 0.374 0.4363 0.4987 0.561 0.6233 0.6857 0.748 0.8103 0.8727 0.935 0.9973 1.0597 1.122 1.1843 1.2467 1.309)
          y=(-0.0696 -0.0449 -0.0322 -0.0232 -0.0168 -0.0123 -0.009 -0.0067 -0.0051 -0.0039 -0.0031 -0.0025 -0.002 -0.0017 -0.0015 -0.0013 -0.0012 -0.0011 -0.0009 -0.0008 -0.0005 -0.0002 0.0003 0.0011 0.0024 0.0043 0.0074 0.0124 0.0289)
    FunctionBasedBushingForce 2mcp_flexion_passive_torque: socket_frame1=secondmc_offset socket_frame2=2proxph_offset
        rotational_damping=(0.0142 0 0)
      PhysicalOffsetFrame secondmc_offset: socket_parent=/bodyset/secondmc translation=(0.003501 -0.028243 0.00362)
          orientation=(0.5052 0.1871 0.0729)
      PhysicalOffsetFrame 2proxph_offset: socket_parent=/bodyset/2proxph translation=(0 0 0)
          orientation=(0.5052 0.1871 0.0729)
      m_x_theta_x_function: SimmSpline: x=(-1.5708 -1.48353 -1.39626 -1.309 -1.22173 -1.13446 -1.0472 -0.959931 -0.872665 -0.785398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)
          y=(-0.298165 -0.22595 -0.171253 -0.129824 -0.0984439 -0.0746759 -0.0566734 -0.0430378 -0.0327098 -0.024887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)
    FunctionBasedBushingForce 2pip_flexion_passive_torque: socket_frame1=2proxph_offset socket_frame2=2midph_offset
        rotational_damping=(0.0105 0 0)
      PhysicalOffsetFrame 2proxph_offset: socket_parent=/bodyset/2proxph translation=(0.007517 -0.041273 0.007326)
          orientation=(0.8101 0.2145 -0.0397)
      PhysicalOffsetFrame 2midph_offset: socket_parent=/bodyset/2midph translation=(0 0 0)
          orientation=(0.8101 0.2145 -0.0397)
      m_x_theta_x_function: SimmSpline: x=(0 0.0872665 0.174533 0.261799 0.349066 0.436332 0.523599 0.610865 0.698132 0.785398 1.22173 1.5708 2.0944)
          y=(-0.015 -0.00363989 0.00725323 0.0174561 0.0267453 0.0348977 0.0416899 0.0468986 0.0503006 0.0516725 0.075 0.11 0.25)
    FunctionBasedBushingForce 2dip_flexion_passive_torque: socket_frame1=2midph_offset socket_frame2=2distph_offset
        rotational_damping=(0.0081 0 0)
      PhysicalOffsetFrame 2midph_offset: socket_parent=/bodyset/2midph translation=(0.003333 -0.024888 0.00122)
          orientation=(-1.4139 -0.1578 -0.051)
      PhysicalOffsetFrame 2distph_offset: socket_parent=/bodyset/2distph translation=(0 0 0)
          orientation=(-1.4139 -0.1578 -0.051)
      m_x_theta_x_function: SimmSpline: x=(-0.0872665 0 0.0872665 0.174533 0.261799 0.349066 0.436332 0.523599 0.610865 0.698132 0.785398 0.872665 0.959931 1.0472 1.13446 1.22173 1.309 1.39626 1.48353 1.5708)
          y=(-0.019 0.019 0.0228295 0.0255162 0.0274708 0.0291039 0.0308263 0.0330487 0.0361817 0.0406362 0.0468227 0.055152 0.0660349 0.079882 0.0971039 0.118112 0.143315 0.173126 0.207955 0.248212)
    FunctionBasedBushingForce 3mcp_flexion_passive_torque: socket_frame1=thirdmc_offset socket_frame2=3proxph_offset
        rotational_damping=(0.0142 0 0)
      PhysicalOffsetFrame thirdmc_offset: socket_parent=/bodyset/thirdmc translation=(0.00024 -0.02629 0.001778)
          orientation=(-0.834919 -0.0281383 0.0395227)
      PhysicalOffsetFrame 3proxph_offset: socket_parent=/bodyset/3proxph translation=(0 0 0)
          orientation=(-0.834919 -0.0281383 0.0395227)
      m_x_theta_x_function: SimmSpline: x=(-1.5708 -1.48353 -1.39626 -1.309 -1.22173 -1.13446 -1.0472 -0.959931 -0.872665 -0.785398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)
          y=(-0.675606 -0.498608 -0.368205 -0.272131 -0.201349 -0.1492 -0.11078 -0.0824738 -0.0616194 -0.046255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)
    FunctionBasedBushingForce 3pip_flexion_passive_torque: socket_frame1=3proxph_offset socket_frame2=3midph_offset
        rotational_damping=(0.0105 0 0)
      PhysicalOffsetFrame 3proxph_offset: socket_parent=/bodyset/3proxph translation=(0.00165 -0.044211 0.00623)
          orientation=(1.43932 -0.0752642 0.0933288)
      PhysicalOffsetFrame 3midph_offset: socket_parent=/bodyset/3midph translation=(0 0 0)
          orientation=(1.43932 -0.0752642 0.0933288)
      m_x_theta_x_function: SimmSpline: x=(0 0.0872665 0.174533 0.261799 0.349066 0.436332 0.523599 0.610865 0.698132 0.785398 1.22173 1.5708 2.0944)
          y=(-0.0315 -0.00764377 0.0152318 0.0366578 0.0561651 0.0732852 0.0875488 0.0984871 0.105631 0.108512 0.1575 0.231 0.525)
    FunctionBasedBushingForce 3dip_flexion_passive_torque: socket_frame1=3midph_offset socket_frame2=3distph_offset
        rotational_damping=(0.0081 0 0)
      PhysicalOffsetFrame 3midph_offset: socket_parent=/bodyset/3midph translation=(0.001365 -0.029047 0.001954)
          orientation=(-0.591741 -0.101188 -0.0243735)
      PhysicalOffsetFrame 3distph_offset: socket_parent=/bodyset/3distph translation=(0 0 0)
          orientation=(-0.591741 -0.101188 -0.0243735)
      m_x_theta_x_function: SimmSpline: x=(-0.0872665 0 0.0872665 0.174533 0.261799 0.349066 0.436332 0.523599 0.610865 0.698132 0.785398 0.872665 0.959931 1.0472 1.13446 1.22173 1.309 1.39626 1.48353 1.5708)
          y=(-0.019 0.0399 0.0479419 0.053584 0.0576887 0.0611182 0.0647352 0.0694023 0.0759816 0.085336 0.0983277 0.115819 0.138673 0.167752 0.203918 0.248035 0.300961 0.363565 0.436706 0.521245)
    FunctionBasedBushingForce 4mcp_flexion_passive_torque: socket_frame1=fourthmc_offset socket_frame2=4proxph_offset
        rotational_damping=(0.0142 0 0)
      PhysicalOffsetFrame fourthmc_offset: socket_parent=/bodyset/fourthmc translation=(-0.0053 -0.0489 0.007)
          orientation=(-1.37151 0.0701008 0.0162527)
      PhysicalOffsetFrame 4proxph_offset: socket_parent=/bodyset/4proxph translation=(0 0 0)
          orientation=(-1.37151 0.0701008 0.0162527)
      m_x_theta_x_function: SimmSpline: x=(-1.5708 -1.48353 -1.39626 -1.309 -1.22173 -1.13446 -1.0472 -0.959931 -0.872665 -0.785398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)
          y=(-0.65841 -0.477249 -0.346097 -0.251148 -0.182409 -0.132645 -0.0966177 -0.0705357 -0.0516533 -0.0379833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)
    FunctionBasedBushingForce 4pip_flexion_passive_torque: socket_frame1=4proxph_offset socket_frame2=4midph_offset
        rotational_damping=(0.0105 0 0)
      PhysicalOffsetFrame 4proxph_offset: socket_parent=/bodyset/4proxph translation=(-0.0039 -0.0398 0.0057)
          orientation=(-0.612157 -0.055864 -0.081388)
      PhysicalOffsetFrame 4midph_offset: socket_parent=/bodyset/4midph translation=(0 0 0)
          orientation=(-0.612157 -0.055864 -0.081388)
      m_x_theta_x_function: SimmSpline: x=(0 0.0872665 0.174533 0.261799 0.349066 0.436332 0.523599 0.610865 0.698132 0.785398 1.22173 1.5708 2.0944)
          y=(-0.02475 -0.00600582 0.0119678 0.0288026 0.0441297 0.0575812 0.0687883 0.0773827 0.082996 0.0852596 0.12375 0.1815 0.4125)
    FunctionBasedBushingForce 4dip_flexion_passive_torque: socket_frame1=4midph_offset socket_frame2=4distph_offset
        rotational_damping=(0.0081 0 0)
      PhysicalOffsetFrame 4midph_offset: socket_parent=/bodyset/4midph translation=(-0.0026 -0.0245 0.0033)
          orientation=(-0.771777 -0.100371 -0.292873)
      PhysicalOffsetFrame 4distph_offset: socket_parent=/bodyset/4distph translation=(0 0 0)
          orientation=(-0.771777 -0.100371 -0.292873)
      m_x_theta_x_function: SimmSpline: x=(-0.0872665 0 0.0872665 0.174533 0.261799 0.349066 0.436332 0.523599 0.610865 0.698132 0.785398 0.872665 0.959931 1.0472 1.13446 1.22173 1.309 1.39626 1.48353 1.5708)
          y=(-0.019 0.03135 0.0376687 0.0421017 0.0453268 0.0480214 0.0508634 0.0545304 0.0596998 0.0670497 0.0772575 0.0910008 0.108958 0.131805 0.160221 0.194885 0.23647 0.285658 0.343126 0.40955)
    FunctionBasedBushingForce 5mcp_flexion_passive_torque: socket_frame1=fifthmc_offset socket_frame2=5proxph_offset
        rotational_damping=(0.0142 0 0)
      PhysicalOffsetFrame fifthmc_offset: socket_parent=/bodyset/fifthmc translation=(-0.0111 -0.0423 0.0097)
          orientation=(0.49878 -0.0735034 -0.205819)
      PhysicalOffsetFrame 5proxph_offset: socket_parent=/bodyset/5proxph translation=(0 0 0)
          orientation=(0.49878 -0.0735034 -0.205819)
      m_x_theta_x_function: SimmSpline: x=(-1.5708 -1.48353 -1.39626 -1.309 -1.22173 -1.13446 -1.0472 -0.959931 -0.872665 -0.785398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)
          y=(-0.339346 -0.255301 -0.192138 -0.144667 -0.10899 -0.0821768 -0.0620253 -0.0468804 -0.0354981 -0.0269438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)
    FunctionBasedBushingForce 5pip_flexion_passive_torque: socket_frame1=5proxph_offset socket_frame2=5midph_offset
        rotational_damping=(0.0105 0 0)
      PhysicalOffsetFrame 5proxph_offset: socket_parent=/bodyset/5proxph translation=(-0.0125 -0.0335 0.0043)
          orientation=(-2.94089 0.251254 0.289816)
      PhysicalOffsetFrame 5midph_offset: socket_parent=/bodyset/5midph translation=(0 0 0)
          orientation=(-2.94089 0.251254 0.289816)
      m_x_theta_x_function: SimmSpline: x=(0 0.0872665 0.174533 0.261799 0.349066 0.436332 0.523599 0.610865 0.698132 0.785398 1.22173 1.5708 2.0944)
          y=(-0.0165 -0.00400388 0.00797855 0.0192017 0.0294198 0.0383875 0.0458589 0.0515885 0.0553307 0.0568398 0.0825 0.121 0.275)
    FunctionBasedBushingForce 5dip_flexion_passive_torque: socket_frame1=5midph_offset socket_frame2=5distph_offset
        rotational_damping=(0.0081 0 0)
      PhysicalOffsetFrame 5midph_offset: socket_parent=/bodyset/5midph translation=(-0.0075 -0.0195 0.002)
          orientation=(1.61793 -0.439268 0.165285)
      PhysicalOffsetFrame 5distph_offset: socket_parent=/bodyset/5distph translation=(0 0 0)
          orientation=(1.61793 -0.439268 0.165285)
      m_x_theta_x_function: SimmSpline: x=(-0.0872665 0 0.0872665 0.174533 0.261799 0.349066 0.436332 0.523599 0.610865 0.698132 0.785398 0.872665 0.959931 1.0472 1.13446 1.22173 1.309 1.39626 1.48353 1.5708)
          y=(-0.019 0.0209 0.0251125 0.0280678 0.0302179 0.0320143 0.0339089 0.0363536 0.0397999 0.0446998 0.051505 0.0606672 0.0726384 0.0878702 0.106814 0.129923 0.157646 0.190439 0.228751 0.273033)
  MarkerSet:
    Marker R.Clavicle: clavicle (0.01835 -0.00464 -0.00046)
    Marker C7: ground (-0.05613 0.05528 -0.00151)
    Marker R.Shoulder: scapula (0.0014 -0.00147 0.01369)
    Marker R.Bicep: humerus (0.01591 -0.18099 -0.00553)
    Marker R.Elbow.Lat: humerus (0.00509 -0.28055 0.02884)
    Marker R.Forearm: radius (0.03828 -0.11326 0.0174)
    Marker R.Wrist.Rad: radius (0.05749 -0.22722 0.02738)
    Marker R.Elbow.Med: humerus (-0.00407 -0.28442 -0.05408)
    Marker R.Wrist.Uln: ulna (-0.01672 -0.24156 0.04782)
    Marker R.Thumb1: firstmc (0.02737887 -0.02603285 -0.0100224)
    Marker R.Thumb2: proximal_thumb (0.02651328 -0.02364794 -0.00575926)
    Marker R.I.Finger1: secondmc (0.005084833 -0.02299493 0.01845075)
    Marker R.I.Finger2: 2proxph (0.008500367 -0.04096472 0.01575688)
    Marker R.I.Finger3: 2midph (0.004331169 -0.02713901 0.009915577)
    Marker R.M.Finger1: thirdmc (0.001150502 -0.019032 0.01592711)
    Marker R.M.Finger2: 5distph (0.05039171 -0.0006630473 0.01150942)
    Marker R.R.Finger1: fourthmc (-0.002977097 -0.0417028 0.01990199)
    Marker R.R.Finger2: 4distph (0.002952607 0.02578327 0.004758068)
    Marker R.P.Finger1: fourthmc (-0.01854971 -0.0372107 0.01895942)
    Marker R.P.Finger2: 5proxph (-0.01133808 -0.03155603 0.01443669) fixed=true
